# OpenSim document version 40600
Model bonobo:
  gravity: 0 0 -9.8066
  Ground
  BodySet:
    Body pelvis: mass=2.7835 [kg] mass_center=(-0.03438 0.030941 0.0050147)
        inertia=(0.015628 0.010281 0.013749 0.0051994 0.00066743 -0.00050183) meshes=(pelvisbone.obj pelvis.obj)
      WrapCylinder rIschium_Cylinder: xyz_body_rotation=(-3.1 0.59 -2.783185)
          translation=(0.02052095 -0.07130981 0.04269679) quadrant=z radius=0.015 length=0.0785
      WrapEllipsoid rPelvis_ellipsoid: xyz_body_rotation=(-1.5 0.9 -0.5) translation=(0.005 0.009 0.08) quadrant=z
          dimensions=(0.016 0.029 0.014)
    Body thigh_l: mass=0.9513 mass_center=(0.00054202 -0.15865 -0.0096099)
        inertia=(0.0083881 0.00045886 0.0082646 0.00013765 6.9434e-6 0.00034346) meshes=(L_femur.obj L_Thigh.obj)
    Body shank_l: mass=0.61452 mass_center=(-0.0014773 -0.14948 -0.021771)
        inertia=(0.0037933 0.00032569 0.0036534 -0.00016148 -5.1825e-5 -0.00054948)
        meshes=(L_fibula.obj L_shankBones.obj L_shank.obj)
    Body foot_l: mass=0.2973 mass_center=(0.04057 -0.006777 -0.012296)
        inertia=(0.0001229 0.00053847 0.00048402 -5.9276e-6 7.3155e-5 -8.0126e-6)
        meshes=(L_hallux.obj L_metatarsals.obj L_footmass.obj)
    Body toes_l: mass=0.040932 mass_center=(0.035192 -0.00065247 -0.012992)
        inertia=(6.8415e-6 2.5418e-5 2.0227e-5 -2.0996e-6 -3.876e-6 -4.4362e-7) meshes=(L_toesbone.obj L_toesmass.obj)
    Body hallux_l: mass=0.0043507 mass_center=(0.021765 -0.0020718 -0.0029605)
        inertia=(1.1381e-7 3.6106e-7 3.3989e-7 4.3328e-8 2.9445e-8 -1.1238e-8)
        meshes=(L_halluxbone.obj L_halluxmass.obj)
    Body thigh_r: mass=0.9513 mass_center=(0.00054202 -0.15865 0.0096099)
        inertia=(0.0083881 0.00045886 0.0082646 0.00013765 -6.9433e-6 -0.00034346) meshes=(R_femur.obj R_thigh.obj)
      WrapCylinder rFemoralNeck_Cylinder_Y: xyz_body_rotation=(0.1 0 -0.7) translation=(0 -0.008 0.01) quadrant=x
          radius=0.021 length=0.052
      WrapCylinder rFemoralNeck: xyz_body_rotation=(0.1 0 -0.7) translation=(0 -0.008 0.01) quadrant=-y radius=0.021
          length=0.052
      WrapSphere rFemoralMedialCondyle_Sphere: xyz_body_rotation=(-1.2 0.9 -1.9) translation=(0.003 -0.267 -0.015)
          quadrant=all radius=0.026
      WrapCylinder rFemoralCondyles_Cylinder: xyz_body_rotation=(3.503 -0.133 -1.5)
          translation=(0.001072272 -0.2572489 0.009351953) quadrant=-y radius=0.028 length=0.074
      WrapCylinder rFemoralCondyles_Cylinder2: xyz_body_rotation=(-3.094142 -0.08587329 -1.171058)
          translation=(0.009611344 -0.3289917 0.003596621) quadrant=y radius=0.017 length=0.065
      WrapCylinder rFemoralCondyles_Cylinder2_0: xyz_body_rotation=(-3.05889 -0.006243836 -1.192904)
          translation=(0.004511137 -0.2970142 0.004096909) quadrant=-y radius=0.025 length=0.065
    Body shank_r: mass=0.61452 mass_center=(-0.0014773 -0.14948 0.021771)
        inertia=(0.0037933 0.00032569 0.0036534 -0.00016148 5.1825e-5 0.00054948)
        meshes=(R_bones.obj R_fibula.obj R_shank.obj)
      WrapEllipsoid rDistalAnkle_EllipsoidForFHL: xyz_body_rotation=(-0.9 1.8 -2) translation=(-0.019 -0.279 -0.012)
          quadrant=-z dimensions=(0.025 0.018 0.012)
      WrapEllipsoid rDistalTibia_ellipsoid: xyz_body_rotation=(-0.6 0.8 -1.9) translation=(-0.01 -0.2780001 -0.022)
          quadrant=-z dimensions=(0.028 0.02 0.012)
      WrapCylinder rProxTibiaCylinder: xyz_body_rotation=(3.099062 -0.02374621 -3.122237)
          translation=(-0.0100498 -0.02988981 0.001843017) quadrant=x radius=0.02 length=0.06
    Body foot_r: mass=0.2973 mass_center=(0.04057 -0.006777 0.012296)
        inertia=(0.0001229 0.00053847 0.00048402 -5.9276e-6 -7.3155e-5 8.0126e-6)
        meshes=(R_Meta1st.obj R_footBone.obj R_foot.obj)
      WrapSphere rDistalAnkle_Sphere: xyz_body_rotation=(-1.2 1.2 -1.9) translation=(0.001 0.015 -0.01) quadrant=all
          radius=0.015
      WrapSphere rDistalAnkle_SphereforFDL: active=false xyz_body_rotation=(-1.2 1.2 -1.9)
          translation=(-0.011 -0.008000003 -0.011) quadrant=all radius=0.017
      WrapCylinder R_Ankle_Cylinder: xyz_body_rotation=(0.18414 -0.3498632 -0.7981521)
          translation=(0.003957461 -0.004045423 -0.007093174) quadrant=-x radius=0.017 length=0.042
      WrapCylinder rPosteriorMetarsalHead_Cylinder: xyz_body_rotation=(0.6853134 -0.6568859 1.59673)
          translation=(0.09634692 -0.01053459 0.04550224) quadrant=x radius=0.009 length=0.045
      WrapCylinder rAnteriorMetarsalHead_Cylinder: xyz_body_rotation=(-2.9 0.31 0.22) translation=(0.11 -0.008 0.02)
          quadrant=y radius=0.01 length=0.04
      WrapCylinder rPosteriorHalluxHead_Cylinder: xyz_body_rotation=(3.4 0.24 -1.9) translation=(0.077 -0.021 0.0025)
          quadrant=-x radius=0.0055 length=0.011
      WrapCylinder rAnteriorHalluxHead_Cylinder: xyz_body_rotation=(3.4 0.24 -1.9) translation=(0.077 -0.015 0.0025)
          quadrant=x radius=0.0055 length=0.011
    Body toes_r: mass=0.040932 mass_center=(0.035192 -0.00065247 0.012992)
        inertia=(6.8415e-6 2.5418e-5 2.0227e-5 -2.0996e-6 3.876e-6 4.4362e-7) meshes=(R_toesbones.obj R_halluxMass.obj)
    Body hallux_r: mass=0.0069264 mass_center=(0.028806 -0.0048991 0.0032116)
        inertia=(2.6583e-7 1.2084e-6 1.2746e-6 3.1856e-7 -7.6391e-8 2.8099e-8) meshes=(halluxr_bone.obj halluxr.obj)
  JointSet:
    CustomJoint pelvis: socket_parent_frame=ground_offset socket_child_frame=pelvis_offset
      Coordinate roll: default_value=0 range=(-1.5708 1.5708) clamped=true
      Coordinate pitch: default_value=0 range=(-1.5708 1.5708) clamped=true
      Coordinate tilt: default_value=0 range=(-1.5708 1.5708) clamped=true
      Coordinate pelvis_Tx: default_value=0 range=(-5 5) clamped=true
      Coordinate pelvis_Ty: default_value=0.6549988 range=(0 1) clamped=true
      Coordinate pelvis_Tz: default_value=0 range=(-5 5) clamped=true
      PhysicalOffsetFrame ground_offset: socket_parent=/ground translation=(0 0 0) [meters]
      PhysicalOffsetFrame pelvis_offset: socket_parent=/bodyset/pelvis translation=(0 0 0)
      SpatialTransform:
        TransformAxis rotation1: coordinates=roll axis=(0 0 1) LinearFunction(coefficients=1 0)
        TransformAxis rotation2: coordinates=pitch axis=(0 1 0) LinearFunction(coefficients=1 0)
        TransformAxis rotation3: coordinates=tilt axis=(1 0 0) LinearFunction(coefficients=1 0)
        TransformAxis translation1: coordinates=pelvis_Tx axis=(1 0 0) LinearFunction(coefficients=1 0)
        TransformAxis translation2: coordinates=pelvis_Ty axis=(0 1 0) LinearFunction(coefficients=1 0)
        TransformAxis translation3: coordinates=pelvis_Tz axis=(0 0 1) LinearFunction(coefficients=1 0)
    CustomJoint hip_l: socket_parent_frame=pelvis_offset socket_child_frame=thigh_l_offset
      Coordinate hip_flexion_l: default_value=-5.374435e-23 range=(-1.5708 1.5708) clamped=true
      Coordinate hip_rotation_l: default_value=-4.287112e-21 range=(-1.5708 1.5708) clamped=true
      Coordinate hip_adduction_l: default_value=0 range=(-1.5708 1.5708) clamped=true
      PhysicalOffsetFrame pelvis_offset: socket_parent=/bodyset/pelvis translation=(-2.9345e-18 -2.9345e-18 -0.063436)
      PhysicalOffsetFrame thigh_l_offset: socket_parent=/bodyset/thigh_l translation=(0 0 0)
      SpatialTransform:
        TransformAxis rotation1: coordinates=hip_flexion_l axis=(0 0 1) LinearFunction(coefficients=1 0)
        TransformAxis rotation2: coordinates=hip_rotation_l axis=(0 1 0) LinearFunction(coefficients=1 0)
        TransformAxis rotation3: coordinates=hip_adduction_l axis=(1 0 0) LinearFunction(coefficients=1 0)
        TransformAxis translation1: axis=(1 0 0)
        TransformAxis translation2: axis=(0 1 0)
        TransformAxis translation3: axis=(0 0 1)
    PinJoint knee_l: socket_parent_frame=thigh_l_offset socket_child_frame=shank_l_offset
      Coordinate knee_flexion_l: default_value=0 range=(-1.6 0)
      PhysicalOffsetFrame thigh_l_offset: socket_parent=/bodyset/thigh_l translation=(1.3825e-17 -0.29886 1.3825e-17)
          orientation=(-0.12333 -1e-8 1e-8) [radians]
      PhysicalOffsetFrame shank_l_offset: socket_parent=/bodyset/shank_l translation=(0 0 0)
    PinJoint ankle_l: socket_parent_frame=shank_l_offset socket_child_frame=foot_l_offset
      Coordinate ankle_flexion_l: default_value=0 range=(-0.8 0.8)
      PhysicalOffsetFrame shank_l_offset: socket_parent=/bodyset/shank_l translation=(-0.01381 -0.30538 -0.049167)
          orientation=(0.31915 -0.024201 -0.12706)
      PhysicalOffsetFrame foot_l_offset: socket_parent=/bodyset/foot_l translation=(0 0 0)
    PinJoint mtp_l: socket_parent_frame=foot_l_offset socket_child_frame=toes_l_offset
      Coordinate mtp_flexion_l: default_value=0 range=(-0.8 0.8)
      PhysicalOffsetFrame foot_l_offset: socket_parent=/bodyset/foot_l translation=(0.11213 1.4399e-9 -0.035857)
          orientation=(-0.5267 0.64317 0.058093)
      PhysicalOffsetFrame toes_l_offset: socket_parent=/bodyset/toes_l translation=(0 0 0)
    PinJoint hallux_l: socket_parent_frame=foot_l_offset socket_child_frame=hallux_l_offset
      Coordinate Hallux_l_FE: default_value=1.188312e-22 range=(-1 1)
      PhysicalOffsetFrame foot_l_offset: socket_parent=/bodyset/foot_l translation=(0.10849 -0.0090019 0.0020057)
          orientation=(0.68399 -0.066658 -0.052462)
      PhysicalOffsetFrame hallux_l_offset: socket_parent=/bodyset/hallux_l translation=(0 0 0)
    CustomJoint hip_r: socket_parent_frame=pelvis_offset socket_child_frame=thigh_r_offset
      Coordinate hip_flexion_r: default_value=2.227413e-17 range=(-1.5708 1.5708) clamped=true
      Coordinate hip_rotation_r: default_value=2.5369e-21 range=(-1.5708 1.5708) clamped=true
      Coordinate hip_adduction_r: default_value=1.614154e-13 range=(-1.5708 1.5708) clamped=true
      PhysicalOffsetFrame pelvis_offset: socket_parent=/bodyset/pelvis translation=(2.9345e-18 2.9345e-18 0.063436)
      PhysicalOffsetFrame thigh_r_offset: socket_parent=/bodyset/thigh_r translation=(0 0 0)
      SpatialTransform:
        TransformAxis rotation1: coordinates=hip_flexion_r axis=(0 0 1) LinearFunction(coefficients=1 0)
        TransformAxis rotation2: coordinates=hip_rotation_r axis=(0 1 0) LinearFunction(coefficients=1 0)
        TransformAxis rotation3: coordinates=hip_adduction_r axis=(1 0 0) LinearFunction(coefficients=1 0)
        TransformAxis translation1: axis=(1 0 0)
        TransformAxis translation2: axis=(0 1 0)
        TransformAxis translation3: axis=(0 0 1)
    PinJoint knee_r: socket_parent_frame=thigh_r_offset socket_child_frame=shank_r_offset
      Coordinate knee_flexion_r: default_value=-0.6283185 range=(-1.6 0)
      PhysicalOffsetFrame thigh_r_offset: socket_parent=/bodyset/thigh_r translation=(-1.3825e-17 -0.29886 -1.3825e-17)
          orientation=(0.12333 -1e-8 1e-8)
      PhysicalOffsetFrame shank_r_offset: socket_parent=/bodyset/shank_r translation=(0 0 0)
    PinJoint ankle_r: socket_parent_frame=shank_r_offset socket_child_frame=foot_r_offset
      Coordinate ankle_flexion_r: default_value=-3.116157e-24 range=(-0.8 0.8)
      PhysicalOffsetFrame shank_r_offset: socket_parent=/bodyset/shank_r translation=(-0.01381 -0.30538 0.049167)
          orientation=(-0.31915 0.024201 -0.12706)
      PhysicalOffsetFrame foot_r_offset: socket_parent=/bodyset/foot_r translation=(0 0 0)
    PinJoint mtp_r: socket_parent_frame=foot_r_offset socket_child_frame=toes_r_offset
      Coordinate mtp_flexion_r: default_value=-1.978683e-21 range=(-0.8 0.8)
      PhysicalOffsetFrame foot_r_offset: socket_parent=/bodyset/foot_r translation=(0.11213 6.4138e-10 0.035857)
          orientation=(0.5267 -0.64317 0.058093)
      PhysicalOffsetFrame toes_r_offset: socket_parent=/bodyset/toes_r translation=(0 0 0)
    PinJoint hallux_r: socket_parent_frame=foot_r_offset socket_child_frame=hallux_r_offset
      Coordinate Hallux_FE: default_value=-1.978683e-21 range=(-1 1)
      PhysicalOffsetFrame foot_r_offset: socket_parent=/bodyset/foot_r translation=(0.10849 -0.0090019 -0.0020057)
          orientation=(-0.68399 0.066658 -0.052462)
      PhysicalOffsetFrame hallux_r_offset: socket_parent=/bodyset/hallux_r translation=(0 0 0)
  ConstraintSet:
    CoordinateCouplerConstraint: independent_coordinate_names=mtp_flexion_r dependent_coordinate_name=Hallux_FE
        coupled_coordinates_function=LinearFunction(coefficients=1 0)
  ForceSet:
    Millard2012EquilibriumMuscle [values shared by the 36 below unless stated]: max_isometric_force=1
        optimal_fiber_length=1 tendon_slack_length=1 pennation_angle_at_optimal=0 [radians] default_fiber_length=1
        minimum_activation=0.01
      ActiveForceLengthCurve: min_norm_active_fiber_length=0.4441 transition_norm_fiber_length=0.73
          max_norm_active_fiber_length=1.8123 shallow_ascending_slope=0.8616 minimum_value=0
      ForceVelocityCurve: concentric_slope_at_vmax=0 concentric_slope_near_vmax=0.25 isometric_slope=5
          eccentric_slope_at_vmax=0 eccentric_slope_near_vmax=0.15 max_eccentric_velocity_force_multiplier=1.4
          concentric_curviness=0.6 eccentric_curviness=0.9
      FiberForceLengthCurve: strain_at_zero_force=0 strain_at_one_norm_force=0.6
      TendonForceLengthCurve: strain_at_one_norm_force=0.049
    Millard2012EquilibriumMuscle R_AM:
      PathPoint Muscle-origin: pelvis (0.04173128 -0.04257964 0.01142102)
      PathPoint Muscle-insertion: pelvis (0.05960514 -0.07484744 0.02060433)
      PathPoint P3: thigh_r (0.002327452 -0.1754362 0.007997609)
    Millard2012EquilibriumMuscle R_AB:
      PathPoint Muscle-origin: pelvis (0.03770387 -0.009933578 0.02081167)
      PathPoint Muscle-insertion: thigh_r (0.0001482272 -0.09246973 0.0174327)
    Millard2012EquilibriumMuscle R_AL:
      PathPoint Muscle-origin: pelvis (0.04486244 -0.01127235 0.01153624)
      PathPoint P2: pelvis (0.05653587 -0.0678334 0.04588965)
      PathPoint Muscle-insertion: thigh_r (0.001930631 -0.1415507 0.01632657)
    Millard2012EquilibriumMuscle R_BFS:
      PathPoint Muscle-origin: thigh_r (0.001802744 -0.1863798 0.01230347)
      PathPoint Muscle-insertion: shank_r (-0.01848192 -0.05592559 0.02586812)
    Millard2012EquilibriumMuscle R_BFL:
      PathPoint Muscle-origin: pelvis (-0.006764299 -0.0732319 0.0621592)
      PathPoint Muscle-insertion: shank_r (-0.02040381 -0.05576525 0.02556446)
    Millard2012EquilibriumMuscle R_EDL_TENDONII:
      PathPoint Muscle-origin: shank_r (0.01473677 -0.04637457 0.02390284)
      PathPoint P2: shank_r (0.007156672 -0.291976 0.05610159)
      PathPoint P3: foot_r (0.08935969 0.01221613 0.03052289)
      PathPoint Muscle-insertion: toes_r (0.05844975 -6.18524e-5 -0.005840029)
      PathWrap: wrap_object=rPosteriorMetarsalHead_Cylinder method=hybrid range=(3 4)
    Millard2012EquilibriumMuscle R_EDL_TENDONIII:
      PathPoint Muscle-origin: shank_r (0.01473677 -0.04637457 0.02390284)
      PathPoint R_EDL_TENDONII-P2: shank_r (0.007156672 -0.291976 0.05610159)
      PathPoint R_EDL_TENDONII-P3: foot_r (0.09761916 0.003518497 0.04736624)
      PathPoint Muscle-insertion: toes_r (0.08153277 0.006670428 0.0006135811)
      PathWrap: wrap_object=rPosteriorMetarsalHead_Cylinder method=hybrid range=(3 -1)
    Millard2012EquilibriumMuscle R_EDL_TENDONIV:
      PathPoint Muscle-origin: shank_r (0.01473677 -0.04637457 0.02390284)
      PathPoint R_EDL_TENDONII-P2: shank_r (0.007156672 -0.291976 0.05610159)
      PathPoint R_EDL_TENDONII-P3: foot_r (0.08627292 -0.00176161 0.05255063)
      PathPoint Muscle-insertion: toes_r (0.07748193 0.008745095 0.01436508)
      PathWrap: wrap_object=rPosteriorMetarsalHead_Cylinder method=hybrid range=(3 -1)
    Millard2012EquilibriumMuscle R_EDL_TENDONV:
      PathPoint Muscle-origin: shank_r (0.01473677 -0.04637457 0.02390284)
      PathPoint R_EDL_TENDONII-P2: shank_r (0.007156672 -0.291976 0.05610159)
      PathPoint R_EDL_TENDONII-P3: foot_r (0.0760783 -0.01066528 0.0575012)
      PathPoint Muscle-insertion: toes_r (0.04806605 0.003714272 0.03057215)
      PathWrap: wrap_object=rPosteriorMetarsalHead_Cylinder method=hybrid range=(3 4)
    Millard2012EquilibriumMuscle R_EHL:
      PathPoint P1: shank_r (-0.006819889 -0.1892752 0.04461271)
      PathPoint P2: shank_r (0.01294139 -0.2914466 0.04181028)
      PathPoint P4: foot_r (0.1145752 -0.003211842 -0.01119724)
      PathPoint P5: hallux_r (0.0555355 -0.01136074 0.006150409)
    Millard2012EquilibriumMuscle R_FDL_TENDONII:
      PathPoint Muscle-origin: shank_r (0.006540365 -0.1362916 0.00996812)
      PathPoint P2: shank_r (-0.02478736 -0.2850329 0.02753585)
      PathPoint P4: foot_r (0.02143823 -0.01754575 -0.004545976)
      PathPoint P4_0: foot_r (0.110886 -0.004985337 0.03312731)
      PathPoint Muscle-insertion: toes_r (0.05845567 -0.003717984 -0.005645525)
      PathWrap pathwrap_0: wrap_object=R_Ankle_Cylinder method=hybrid range=(2 3)
    Millard2012EquilibriumMuscle R_FDL_TENDONIII:
      PathPoint Muscle-origin: shank_r (0.006540365 -0.1362916 0.00996812)
      PathPoint R_FDL_TENDONII-P2: shank_r (-0.02478736 -0.2850329 0.02753585)
      PathPoint R_FDL_TENDONII-P4: foot_r (0.02143823 -0.01754575 -0.004545976)
      PathPoint R_FDL_TENDONII-P4_0: foot_r (0.101391 -0.01039465 0.03866926)
      PathPoint Muscle-insertion: toes_r (0.08222188 0.003341374 -0.0005510301)
      PathWrap pathwrap_0: wrap_object=R_Ankle_Cylinder method=hybrid range=(-1 3)
    Millard2012EquilibriumMuscle R_FDL_TENDONIV:
      PathPoint Muscle-origin: shank_r (0.006540365 -0.1362916 0.00996812)
      PathPoint R_FDL_TENDONII-P2: shank_r (-0.02478736 -0.2850329 0.02753585)
      PathPoint R_FDL_TENDONII-P4: foot_r (0.02143823 -0.01754575 -0.004545976)
      PathPoint R_FDL_TENDONII-P4_0: foot_r (0.09355582 -0.01717641 0.04568819)
      PathPoint Muscle-insertion: toes_r (0.0802026 0.005747076 0.01478861)
      PathWrap pathwrap_0: wrap_object=R_Ankle_Cylinder method=hybrid range=(1 3)
    Millard2012EquilibriumMuscle R_FDL_TENDONV:
      PathPoint Muscle-origin: shank_r (0.006540365 -0.1362916 0.00996812)
      PathPoint R_FDL_TENDONII-P2: shank_r (-0.02478736 -0.2850329 0.02753585)
      PathPoint R_FDL_TENDONII-P4: foot_r (0.02143823 -0.01754575 -0.004545976)
      PathPoint R_FDL_TENDONII-P4_0: foot_r (0.08951481 -0.02522863 0.0561929)
      PathPoint Muscle-insertion: toes_r (0.04979549 0.0006991298 0.02907235)
      PathWrap: wrap_object=R_Ankle_Cylinder method=hybrid
    Millard2012EquilibriumMuscle R_FHL:
      PathPoint Muscle-origin: shank_r (-0.01148438 -0.1084344 0.03485282)
      PathPoint P2: shank_r (-0.03627515 -0.2837024 0.0484783)
      PathPoint Muscle-insertion: foot_r (0.03460551 -0.02475612 -0.005981551)
      PathPoint P4: foot_r (0.09965693 -0.01643003 -0.004867886)
      PathPoint P4_0: hallux_r (0.03411092 -0.005970548 0.00410366)
      PathWrap: wrap_object=R_Ankle_Cylinder method=hybrid
    Millard2012EquilibriumMuscle R_GMax:
      PathPoint Muscle-origin: pelvis (-0.06908353 0.05988679 0.03596281)
      PathPoint R_GMax_central-P2: pelvis (-0.06205042 -0.01692842 0.06411313)
      PathPoint Muscle-insertion: thigh_r (-0.006246713 -0.08266563 0.0332231)
    Millard2012EquilibriumMuscle R_GMed:
      PathPoint Muscle-origin: pelvis (-0.1043447 0.1247577 0.0997177)
      PathPoint P2: pelvis (-0.06968959 0.05506482 0.1032766)
      PathPoint Muscle-insertion: thigh_r (-0.001936567 0.005109966 0.04503434)
    Millard2012EquilibriumMuscle R_GMin:
      PathPoint Muscle-origin: pelvis (-0.07802065 0.1027332 0.07598513)
      PathPoint Muscle-insertion: thigh_r (-0.01323949 0.01158263 0.03725862)
    Millard2012EquilibriumMuscle R_GRA:
      PathPoint Muscle-origin: pelvis (0.05152888 -0.03197211 0.008724236)
      PathPoint P2: pelvis (0.07034521 -0.07042052 0.02018074)
      PathPoint Muscle-insertion: shank_r (0.009327654 -0.03565611 -0.02360177)
      PathWrap: wrap_object=rIschium_Cylinder method=hybrid
    Millard2012EquilibriumMuscle R_ILI:
      PathPoint Muscle-origin: pelvis (-0.09397994 0.1251882 0.07978353)
      PathPoint P2: pelvis (0.01312041 0.02050248 0.07071074)
      PathPoint P4: thigh_r (0.009862499 -0.03869235 0.0140723)
      PathPoint Muscle-insertion: thigh_r (0.001327208 -0.06827305 0.01841481)
      PathWrap: wrap_object=rFemoralNeck_Cylinder_Y method=hybrid range=(2 3)
    Millard2012EquilibriumMuscle R_LG:
      PathPoint Muscle-origin: thigh_r (-0.006480402 -0.2888716 0.01108527)
      PathPoint P2: shank_r (-0.04456487 -0.0855294 0.0496769)
      PathPoint Muscle-insertion: foot_r (-0.03713844 0.0005649194 0.008589203)
      PathWrap: wrap_object=rProxTibiaCylinder method=hybrid
    Millard2012EquilibriumMuscle R_MG:
      PathPoint Muscle-origin: thigh_r (-0.00947555 -0.2853742 -0.004557502)
      PathPoint P2: shank_r (-0.0329024 -0.1519515 -0.004044417)
      PathPoint Muscle-insertion: foot_r (-0.03457741 -0.00109309 0.003868907)
      PathWrap: wrap_object=rProxTibiaCylinder method=hybrid range=(1 2)
    Millard2012EquilibriumMuscle R_PB:
      PathPoint Muscle-origin: shank_r (-0.01391906 -0.1739504 0.05136396)
      PathPoint Muscle-insertion: foot_r (-0.0108656 -0.009096867 0.02656462)
      PathPoint P3: foot_r (0.03332036 -0.02011378 0.04064392)
    Millard2012EquilibriumMuscle R_PIRI:
      PathPoint Muscle-origin: pelvis (-0.06837807 0.03908521 0.02490456)
      PathPoint Muscle-insertion: thigh_r (-0.01616122 0.004743541 0.03398792)
    Millard2012EquilibriumMuscle R_PL:
      PathPoint P1: shank_r (-0.01385344 -0.05725936 0.03317568)
      PathPoint Muscle-origin: shank_r (-0.03825415 -0.3011784 0.0685641)
      PathPoint Muscle-insertion: foot_r (0.03547135 -0.01654909 0.0391292)
    Millard2012EquilibriumMuscle R_RF:
      PathPoint Muscle-origin: pelvis (-0.04033356 0.06547577 0.08436839)
      PathPoint P2: pelvis (0.0254033 -0.01281928 0.08252587)
      PathPoint P3: thigh_r (0.02763465 -0.2918495 0.009843925)
      PathPoint Muscle-insertion: shank_r (0.02654297 -0.04794884 0.01111794)
      PathWrap: wrap_object=rFemoralCondyles_Cylinder2 method=hybrid range=(3 4)
    Millard2012EquilibriumMuscle R_SAR:
      PathPoint Muscle-origin: pelvis (-0.06993014 0.09459774 0.1248311)
      PathPoint P2: thigh_r (0.02633458 0.004137122 0.03158939)
      PathPoint P4: thigh_r (0.03321312 -0.1313013 0.0003715697)
      PathPoint P4_0: shank_r (0.01991811 -0.007231653 -0.02931694)
      PathPoint Muscle-insertion: shank_r (0.01893144 -0.04544177 -0.004986959)
      PathWrap: wrap_object=rFemoralMedialCondyle_Sphere method=hybrid
    Millard2012EquilibriumMuscle R_SM:
      PathPoint Muscle-origin: pelvis (-0.005985517 -0.07599734 0.05896692)
      PathPoint P3: thigh_r (-0.02079471 -0.2189773 -0.02224905)
      PathPoint Muscle-insertion: shank_r (-0.01390864 -0.03525247 -0.01766465)
      PathWrap: wrap_object=rFemoralMedialCondyle_Sphere method=hybrid
    Millard2012EquilibriumMuscle R_SOL:
      PathPoint Muscle-origin: shank_r (-0.0177027 -0.06711509 0.02291822)
      PathPoint Muscle-insertion: foot_r (-0.03406169 -0.0008520065 0.008365767)
    Millard2012EquilibriumMuscle R_ST:
      PathPoint Muscle-origin: pelvis (0.006700316 -0.08128233 0.05056208)
      PathPoint P3: thigh_r (-0.00522084 -0.2099372 -0.03913198)
      PathPoint P4: shank_r (0.008810831 -0.02816465 -0.02907089)
      PathPoint Muscle-insertion: shank_r (0.01936968 -0.05622134 -0.005169355)
      PathWrap: wrap_object=rFemoralMedialCondyle_Sphere method=hybrid
    Millard2012EquilibriumMuscle R_TA:
      PathPoint Muscle-origin: shank_r (0.01564311 -0.04894561 0.02198223)
      PathPoint P2: shank_r (0.02476359 -0.1786479 0.03102547)
      PathPoint Muscle-insertion: shank_r (0.01362702 -0.2736289 0.04480752)
      PathPoint P4: foot_r (0.0545537 -0.004234819 -0.01688674)
    Millard2012EquilibriumMuscle R_TP:
      PathPoint Muscle-origin: shank_r (-0.001140369 -0.05351176 0.009598329)
      PathPoint P2: shank_r (-0.00838001 -0.2432153 0.02193484)
      PathPoint P4: shank_r (-0.01840155 -0.3156682 0.02310209)
      PathPoint P3: foot_r (0.02823658 -0.01736037 -0.01733349)
    Millard2012EquilibriumMuscle R_PECT:
      PathPoint Muscle-origin: pelvis (0.03700529 -0.007133005 0.01703679)
      PathPoint P2: pelvis (0.0225218 -0.06892506 0.07309973)
      PathPoint Muscle-insertion: thigh_r (0.003894184 -0.06984442 0.01674998)
    Millard2012EquilibriumMuscle R_VI:
      PathPoint Muscle-origin: thigh_r (0.01104914 -0.05250439 0.03119457)
      PathPoint P2: thigh_r (0.02618488 -0.1526475 0.02499097)
      PathPoint P3: thigh_r (0.02926126 -0.2940951 0.0133533)
      PathPoint Muscle-insertion: shank_r (0.02501086 -0.04432775 0.0102017)
      PathWrap: wrap_object=rFemoralCondyles_Cylinder2 method=hybrid range=(3 4)
    Millard2012EquilibriumMuscle R_VL:
      PathPoint Muscle-origin: thigh_r (0.01176982 -0.008939593 0.03731624)
      PathPoint P2: thigh_r (0.02458253 -0.1794726 0.04087303)
      PathPoint P3: thigh_r (0.02658539 -0.2979296 0.0182923)
      PathPoint Muscle-insertion: shank_r (0.02668846 -0.04403362 0.009500995)
      PathWrap: wrap_object=rFemoralCondyles_Cylinder2 method=hybrid range=(3 4)
    Millard2012EquilibriumMuscle R_VMed:
      PathPoint Muscle-origin: thigh_r (0.006828524 -0.03697465 0.02371343)
      PathPoint P2: thigh_r (0.02624813 -0.157705 -0.001100963)
      PathPoint P3: thigh_r (0.02972343 -0.296282 0.003449601)
      PathPoint Muscle-insertion: shank_r (0.02693249 -0.04405639 0.008888625)
      PathWrap: wrap_object=rFemoralCondyles_Cylinder2 method=hybrid range=(3 4)
