# OpenSim document version 40600
Model ChimpanzeeMSK:
  gravity: 0 -9.8066 0
  Ground
  BodySet:
    Body Pelvis: mass=24.9853 [kg] mass_center=(-0.10615 0.26281 -0.0034317)
        inertia=(2.6771 0.77403 2.4988 0.60596 0.073039 -0.060386) meshes=(Pelvis.obj BodyMass.obj pelvisSegment.obj)
      WrapCylinder rIschium_Cylinder2: xyz_body_rotation=(0.5 0 0.9) translation=(0.055 -0.055 0.015) quadrant=-y
          radius=0.009 length=0.04
      WrapCylinder rIschium_Cylinder: xyz_body_rotation=(-3.1 0.59 3.5) translation=(0.034 -0.07 0.057) quadrant=-x
          radius=0.011 length=0.0785
      WrapEllipsoid rPubis_ellipsoid2: xyz_body_rotation=(0.3 0.03 2.5) translation=(0.015 -0.065 0.08) quadrant=z
          dimensions=(0.02 0.01 0.007)
      WrapEllipsoid rPelvis_ellipsoid: xyz_body_rotation=(-1.5 0.9 -0.5) translation=(0.005 0.009 0.08) quadrant=z
          dimensions=(0.016 0.029 0.014)
    Body L_Thigh: mass=1.29675 mass_center=(0.0115 -0.1464 -0.0294)
        inertia=(0.014927 0.0046146 0.016113 -0.00061884 9.3004e-5 -0.00082243) meshes=(lFemurbone.obj lThigh.obj)
    Body L_Shank: mass=0.85135 mass_center=(0.01663 -0.14222 -0.0021129)
        inertia=(0.0095123 0.00202 0.0093189 0.00037366 -0.00027668 0.00064355) meshes=(lShankbone.obj lShank.obj)
    Body L_Foot: mass=0.64405 mass_center=(0.049474 -0.0083107 -0.0062205)
        inertia=(0.0018253 0.003416 0.0036414 0.00030047 -0.00018926 -1.8688e-5) meshes=(lFootbone.obj lFoot.obj)
    Body L_Toes: mass=0.036706 mass_center=(0.034104 -0.00091712 -0.015704)
        inertia=(6.7869e-6 1.8033e-5 1.2696e-5 2.2619e-7 -1.9694e-6 -1.0422e-6) meshes=(lDigitsbone.obj lDigits.obj)
    Body R_Thigh: mass=1.29675 mass_center=(0.0115 -0.1464 0.0295)
        inertia=(0.014927 0.0046146 0.016113 -0.00061884 -9.3004e-5 0.00082243) meshes=(rThighbone.obj rThigh.obj)
      WrapCylinder rFemoralNeck_Cylinder_Y: xyz_body_rotation=(0.1 6.269225e-17 -0.7)
          translation=(0.005498993 -0.003450838 0.01) quadrant=x radius=0.021 length=0.052
      WrapCylinder rFemoralNeck: xyz_body_rotation=(0.1 0 -0.7) translation=(0 -0.008 0.01) quadrant=-y radius=0.021
          length=0.052
      WrapSphere rFemoralMedialCondyle_Sphere: xyz_body_rotation=(-1.2 0.9 -1.9) translation=(0.003 -0.267 -0.015)
          quadrant=all radius=0.026
      WrapCylinder rFemoralCondyles_Cylinder: active=false xyz_body_rotation=(-2.780185 -0.133 -1.5)
          translation=(-0.005089595 -0.2599429 0.00919412) quadrant=-y radius=0.02 length=0.074
      WrapCylinder rFemoralCondyles_Cylinder2: xyz_body_rotation=(-2.883996 -0.01050213 -1.142303)
          translation=(0.009699314 -0.2798017 0.00352887) quadrant=y radius=0.02 length=0.075
    Body R_Shank: mass=0.85135 mass_center=(0.01663 -0.14222 0.0021129)
        inertia=(0.0095123 0.00202 0.0093189 0.00037366 0.00027668 -0.00064355) meshes=(rShankbone.obj rShank.obj)
      WrapEllipsoid rDistalAnkle_EllipsoidForFHL: xyz_body_rotation=(-0.9 1.8 -2) translation=(-0.019 -0.279 -0.012)
          quadrant=-z dimensions=(0.025 0.018 0.012)
      WrapEllipsoid rDistalTibia_ellipsoid: xyz_body_rotation=(-0.6 0.8 -1.9) translation=(-0.01 -0.2780001 -0.022)
          quadrant=-z dimensions=(0.028 0.02 0.012)
      WrapCylinder rProxTibiaCylinder: xyz_body_rotation=(-2.922506 -0.006201259 -3.104506)
          translation=(-0.01627709 -0.03256636 0.003809349) quadrant=x radius=0.02 length=0.06
    Body R_Foot: mass=0.64405 mass_center=(0.049474 -0.0083107 0.0062205)
        inertia=(0.0018253 0.003416 0.0036414 0.00030047 0.00018926 1.8688e-5) meshes=(rFootbones.obj rFootmass.obj)
      WrapSphere rDistalAnkle_Sphere: xyz_body_rotation=(-1.2 1.2 -1.9) translation=(0.001 0.015 -0.01) quadrant=all
          radius=0.015
      WrapSphere rDistalAnkle_SphereforFDL: active=false xyz_body_rotation=(-1.2 1.2 -1.9)
          translation=(-0.011 -0.008000003 -0.011) quadrant=all radius=0.017
      WrapCylinder R_Ankle_Cylinder: xyz_body_rotation=(0.13 0.1 -0.78)
          translation=(-0.004677073 -0.007241479 -0.009205893) quadrant=-x radius=0.017 length=0.042
      WrapCylinder rPosteriorMetarsalHead_Cylinder: xyz_body_rotation=(-2.855441 0.4128861 -0.1000106)
          translation=(0.09917932 -0.007453225 0.01595183) quadrant=-y radius=0.009 length=0.045
    Body R_Toes: mass=0.036706 mass_center=(0.034104 -0.00091711 0.015704)
        inertia=(6.7869e-6 1.8033e-5 1.2696e-5 2.2619e-7 1.9694e-6 1.0422e-6) meshes=(rDigitsbone.obj rDigitsmass.obj)
    Body R_Hallux: mass=1.2895 mass_center=(-0.070732 -0.0084908 0.036612)
        inertia=(0.0022634 0.0033142 0.003319 0.00051074 -0.00067208 0.00015823)
        meshes=(halluxr_bone.obj rFootmass.obj)
  JointSet:
    CustomJoint ground_pelvis: socket_parent_frame=ground_offset socket_child_frame=Pelvis_offset
      Coordinate Roll: default_value=0 range=(-1.5708 1.5708) clamped=true
      Coordinate Pitch: default_value=0 range=(-1.5708 1.5708) clamped=true
      Coordinate Tilt: default_value=0 range=(-1.5708 1.5708) clamped=true
      Coordinate ground_pelvis_Tx: default_value=3.850404e-7 range=(-1 2.5) clamped=true
      Coordinate pelvis_ty: default_value=0.775 range=(-1 2.5) clamped=true
      Coordinate ground_pelvis_Tz: default_value=0 range=(-1 1) clamped=true
      PhysicalOffsetFrame ground_offset: socket_parent=/ground translation=(0.003 -0.118 0.001) [meters]
      PhysicalOffsetFrame Pelvis_offset: socket_parent=/bodyset/Pelvis translation=(0 0 0)
      SpatialTransform:
        TransformAxis rotation1: coordinates=Roll axis=(0 0 1) LinearFunction(coefficients=1 0)
        TransformAxis rotation2: coordinates=Pitch axis=(0 1 0) LinearFunction(coefficients=1 0)
        TransformAxis rotation3: coordinates=Tilt axis=(1 0 0) LinearFunction(coefficients=1 0)
        TransformAxis translation1: coordinates=ground_pelvis_Tx axis=(1 0 0) LinearFunction(coefficients=1 0)
        TransformAxis translation2: coordinates=pelvis_ty axis=(0 1 0) LinearFunction(coefficients=1 0)
        TransformAxis translation3: coordinates=ground_pelvis_Tz axis=(0 0 1) LinearFunction(coefficients=1 0)
    CustomJoint L_Hip: socket_parent_frame=Pelvis_offset socket_child_frame=L_Thigh_offset
      Coordinate L_Hip_FE: default_value=1.935442e-16 range=(-1.5708 1.5708) clamped=true
      Coordinate L_Hip_Rotation: default_value=0 range=(-1.5708 1.5708) clamped=true
      Coordinate L_Hip_ABAD: default_value=0 range=(-1.5708 1.5708) clamped=true
      PhysicalOffsetFrame Pelvis_offset: socket_parent=/bodyset/Pelvis translation=(0.0014016 -0.00018887 -0.068)
          orientation=(-9e-8 0 0) [radians]
      PhysicalOffsetFrame L_Thigh_offset: socket_parent=/bodyset/L_Thigh translation=(0 0 0)
      SpatialTransform:
        TransformAxis rotation1: coordinates=L_Hip_FE axis=(0 0 1) LinearFunction(coefficients=1 0)
        TransformAxis rotation2: coordinates=L_Hip_Rotation axis=(0 1 0) LinearFunction(coefficients=1 0)
        TransformAxis rotation3: coordinates=L_Hip_ABAD axis=(1 0 0) LinearFunction(coefficients=1 0)
        TransformAxis translation1: axis=(1 0 0)
        TransformAxis translation2: axis=(0 1 0)
        TransformAxis translation3: axis=(0 0 1)
    PinJoint L_Knee: socket_parent_frame=L_Thigh_offset socket_child_frame=L_Shank_offset
      Coordinate L_Knee_FE: default_value=-1.475329e-32 range=(-2 0)
      PhysicalOffsetFrame L_Thigh_offset: socket_parent=/bodyset/L_Thigh translation=(-2.0027e-11 -0.26822 -2.0027e-11)
          orientation=(-0.0058521 0 0)
      PhysicalOffsetFrame L_Shank_offset: socket_parent=/bodyset/L_Shank translation=(0 0 0) orientation=(-0.12333 0 0)
    PinJoint L_Ankle: socket_parent_frame=L_Shank_offset socket_child_frame=L_Foot_offset
      Coordinate L_ankle_FE: default_value=0 range=(-1 1)
      PhysicalOffsetFrame L_Shank_offset: socket_parent=/bodyset/L_Shank translation=(-5.4711e-11 -0.27381 0.010078)
          orientation=(-0.019797 0.029793 -0.00050622)
      PhysicalOffsetFrame L_Foot_offset: socket_parent=/bodyset/L_Foot translation=(0 0 0)
    PinJoint L_MTP: socket_parent_frame=L_Foot_offset socket_child_frame=L_Toes_offset
      Coordinate L_MTP_FE: default_value=0 range=(-1 1)
      PhysicalOffsetFrame L_Foot_offset: socket_parent=/bodyset/L_Foot translation=(0.10952 3.2417e-9 -0.00037314)
          orientation=(-0.064777 0.26377 0.00022824)
      PhysicalOffsetFrame L_Toes_offset: socket_parent=/bodyset/L_Toes translation=(0 0 0)
    CustomJoint R_Hip: socket_parent_frame=Pelvis_offset socket_child_frame=R_Thigh_offset
      Coordinate R_Hip_FE: default_value=1.546362 range=(-1.74 2.0944) clamped=false
      Coordinate R_Hip_Rotation: default_value=4.322545e-13 range=(-3.14 3.14) clamped=true
      Coordinate R_Hip_ABAD: default_value=0.8726217 range=(-0.872665 0.872665) clamped=true
      PhysicalOffsetFrame Pelvis_offset: socket_parent=/bodyset/Pelvis translation=(0.0014015 -0.00018887 0.068)
          orientation=(-9e-8 0 0)
      PhysicalOffsetFrame R_Thigh_offset: socket_parent=/bodyset/R_Thigh translation=(0 0 0)
      SpatialTransform:
        TransformAxis rotation1: coordinates=R_Hip_FE axis=(0 0 1) LinearFunction(coefficients=1 0)
        TransformAxis rotation2: coordinates=R_Hip_Rotation axis=(0 1 0) LinearFunction(coefficients=1 0)
        TransformAxis rotation3: coordinates=R_Hip_ABAD axis=(1 0 0) LinearFunction(coefficients=1 0)
        TransformAxis translation1: axis=(1 0 0)
        TransformAxis translation2: axis=(0 1 0)
        TransformAxis translation3: axis=(0 0 1)
    PinJoint R_Knee: socket_parent_frame=R_Thigh_offset socket_child_frame=R_Shank_offset
      Coordinate R_Knee_FE: default_value=3.932353e-24 range=(-2 0)
      PhysicalOffsetFrame R_Thigh_offset: socket_parent=/bodyset/R_Thigh translation=(-2.0027e-11 -0.26822 -2.0027e-11)
          orientation=(0.0058521 0 0)
      PhysicalOffsetFrame R_Shank_offset: socket_parent=/bodyset/R_Shank translation=(0 0 0) orientation=(0.12333 0 0)
    PinJoint R_Ankle: socket_parent_frame=R_Shank_offset socket_child_frame=R_Foot_offset
      Coordinate R_Ankle_FE: default_value=2.634185e-29 range=(-1 1)
      PhysicalOffsetFrame R_Shank_offset: socket_parent=/bodyset/R_Shank translation=(-6.1012e-11 -0.27381 -0.010078)
          orientation=(0.019797 -0.029793 -0.00050622)
      PhysicalOffsetFrame R_Foot_offset: socket_parent=/bodyset/R_Foot translation=(0 0 0)
    PinJoint R_MTP: socket_parent_frame=R_Foot_offset socket_child_frame=R_Toes_offset
      Coordinate R_MTP_FE: default_value=-7.996391e-19 range=(-1 1)
      PhysicalOffsetFrame R_Foot_offset: socket_parent=/bodyset/R_Foot translation=(0.10952 3.242e-9 0.00037314)
          orientation=(0.064777 -0.26377 0.00022824)
      PhysicalOffsetFrame R_Toes_offset: socket_parent=/bodyset/R_Toes translation=(0 0 0)
    PinJoint R_Hallux: socket_parent_frame=R_Foot_offset socket_child_frame=R_Hallux_offset
      Coordinate R_Hallux_FE: default_value=-7.996391e-19 range=(-1 1)
      PhysicalOffsetFrame R_Foot_offset: socket_parent=/bodyset/R_Foot translation=(0.082286 -0.017768 -0.062026)
          orientation=(-0.76568 0.60605 0.29275)
      PhysicalOffsetFrame R_Hallux_offset: socket_parent=/bodyset/R_Hallux translation=(0 0 0)
  ConstraintSet:
    CoordinateCouplerConstraint: independent_coordinate_names=R_MTP_FE dependent_coordinate_name=R_Hallux_FE
        coupled_coordinates_function=LinearFunction(coefficients=1 0)
  ForceSet:
    Millard2012EquilibriumMuscle [values shared by the 36 below unless stated]: max_isometric_force=1
        optimal_fiber_length=1 tendon_slack_length=1 pennation_angle_at_optimal=0 [radians] default_fiber_length=1
        minimum_activation=0.01
      ActiveForceLengthCurve: min_norm_active_fiber_length=0.4441 transition_norm_fiber_length=0.73
          max_norm_active_fiber_length=1.8123 shallow_ascending_slope=0.8616 minimum_value=0
      ForceVelocityCurve: concentric_slope_at_vmax=0 concentric_slope_near_vmax=0.25 isometric_slope=5
          eccentric_slope_at_vmax=0 eccentric_slope_near_vmax=0.15 max_eccentric_velocity_force_multiplier=1.4
          concentric_curviness=0.6 eccentric_curviness=0.9
      FiberForceLengthCurve: strain_at_zero_force=0 strain_at_one_norm_force=0.6
      TendonForceLengthCurve: strain_at_one_norm_force=0.049
    Millard2012EquilibriumMuscle R_AM:
      PathPoint Muscle-origin: Pelvis (0.05573624 -0.04242657 0.01179415)
      PathPoint Muscle-insertion: Pelvis (0.05877712 -0.07050465 0.02766765)
      PathPoint P3: R_Thigh (0.0004685926 -0.1850288 0.01379985)
    Millard2012EquilibriumMuscle R_AB:
      PathPoint Muscle-origin: Pelvis (0.05174604 -0.00221269 0.009506876)
      PathPoint Muscle-insertion: R_Thigh (0.008325744 -0.086 0.017)
    Millard2012EquilibriumMuscle R_AL:
      PathPoint Muscle-origin: Pelvis (0.055 -0.008 0.005)
      PathPoint P2: Pelvis (0.0605866 -0.05027793 0.03414021)
      PathPoint Muscle-insertion: R_Thigh (-0.006389281 -0.163 0.02)
      PathWrap: wrap_object=rIschium_Cylinder method=hybrid
    Millard2012EquilibriumMuscle R_BFS:
      PathPoint Muscle-origin: R_Thigh (-0.005084939 -0.1928311 0.01839781)
      PathPoint Muscle-insertion: R_Shank (-0.01140384 -0.06107887 0.0339129)
      PathWrap: wrap_object=rFemoralCondyles_Cylinder method=hybrid
    Millard2012EquilibriumMuscle R_BFL:
      PathPoint Muscle-origin: Pelvis (0.006887072 -0.077046 0.058046)
      PathPoint Muscle-insertion: R_Shank (-0.01193632 -0.06158423 0.03194917)
      PathWrap: wrap_object=rFemoralCondyles_Cylinder method=hybrid
    Millard2012EquilibriumMuscle R_EDL_TENDONII:
      PathPoint Muscle-origin: R_Shank (0.01219055 -0.0458018 0.02121898)
      PathPoint P2: R_Shank (0.02910926 -0.2687864 -0.002190883)
      PathPoint P3: R_Foot (0.09007769 0.009511597 0.0008209485)
      PathPoint Muscle-insertion: R_Toes (0.05175307 0.009965348 -0.006716237)
      PathWrap: wrap_object=rPosteriorMetarsalHead_Cylinder method=hybrid range=(3 4)
    Millard2012EquilibriumMuscle R_EDL_TENDONIII:
      PathPoint Muscle-origin: R_Shank (0.01219055 -0.0458018 0.02121898)
      PathPoint P2: R_Shank (0.02910926 -0.2684624 -0.002192779)
      PathPoint P3: R_Foot (0.08667436 0.008486776 0.01550382)
      PathPoint Muscle-insertion: R_Toes (0.05663498 0.007751434 0.008832887)
      PathWrap: wrap_object=rPosteriorMetarsalHead_Cylinder method=hybrid range=(3 -1)
    Millard2012EquilibriumMuscle R_EDL_TENDONIV:
      PathPoint Muscle-origin: R_Shank (0.01219055 -0.0458018 0.02121898)
      PathPoint R_EDL_TENDONIV_P2: R_Shank (0.02910926 -0.2684395 -0.002192913)
      PathPoint P3: R_Foot (0.09104197 0.007809596 0.02765021)
      PathPoint Muscle-insertion: R_Toes (0.0493897 0.005800506 0.02432692)
      PathWrap: wrap_object=rPosteriorMetarsalHead_Cylinder method=hybrid range=(3 -1)
    Millard2012EquilibriumMuscle R_EDL_TENDONV:
      PathPoint Muscle-origin: R_Shank (0.01219055 -0.0458018 0.02121898)
      PathPoint R_EDL_TENDONV_P2: R_Shank (0.02910926 -0.268723 -0.002191254)
      PathPoint P3: R_Foot (0.08288124 -0.00240402 0.03538629)
      PathPoint Muscle-insertion: R_Toes (0.0399606 -0.002571274 0.03417954)
      PathWrap: wrap_object=rPosteriorMetarsalHead_Cylinder method=hybrid range=(3 4)
    Millard2012EquilibriumMuscle R_EHL:
      PathPoint P1: R_Shank (0.007560656 -0.1770121 0.01588977)
      PathPoint P2: R_Shank (0.02414559 -0.2613678 -0.01336971)
      PathPoint P4: R_Foot (0.08047956 -0.01264899 -0.07102021)
      PathPoint P5: R_Hallux (0.035654 0.004356353 -0.004689308)
    Millard2012EquilibriumMuscle R_FDL_TENDONII:
      PathPoint Muscle-origin: R_Shank (0.001160883 -0.1338364 -0.01440976)
      PathPoint P2: R_Shank (-0.02086172 -0.2542129 -0.02087313)
      PathPoint P4: R_Foot (0.007594675 -0.02370601 -0.01193744)
      PathPoint P4_0: R_Foot (0.09917911 -0.005774243 -0.005191355)
      PathPoint Muscle-insertion: R_Toes (0.05038692 -8.132019e-5 -0.005263317)
      PathWrap pathwrap_0: wrap_object=R_Ankle_Cylinder method=hybrid range=(2 3)
    Millard2012EquilibriumMuscle R_FDL_TENDONIII:
      PathPoint Muscle-origin: R_Shank (0.001160883 -0.1338364 -0.01440976)
      PathPoint R_FDL_TENDONII-P2: R_Shank (-0.02086172 -0.2542129 -0.02087313)
      PathPoint R_FDL_TENDONII-P4: R_Foot (0.007594675 -0.02370601 -0.01193744)
      PathPoint R_FDL_TENDONII-P4_0: R_Foot (0.0993384 -0.01138726 0.008223244)
      PathPoint Muscle-insertion: R_Toes (0.05016486 -0.002371926 0.009707391)
      PathWrap pathwrap_0: wrap_object=R_Ankle_Cylinder method=hybrid range=(-1 3)
    Millard2012EquilibriumMuscle R_FDL_TENDONIV:
      PathPoint Muscle-origin: R_Shank (0.001160883 -0.1338364 -0.01440976)
      PathPoint R_FDL_TENDONII-P2: R_Shank (-0.02086172 -0.2542129 -0.02087313)
      PathPoint R_FDL_TENDONII-P4: R_Foot (0.007594675 -0.02370601 -0.01193744)
      PathPoint R_FDL_TENDONII-P4_0: R_Foot (0.09254087 -0.01080261 0.01721919)
      PathPoint Muscle-insertion: R_Toes (0.04805909 -0.004051694 0.02370046)
      PathWrap pathwrap_0: wrap_object=R_Ankle_Cylinder method=hybrid range=(1 3)
    Millard2012EquilibriumMuscle R_FDL_TENDONV:
      PathPoint Muscle-origin: R_Shank (0.001160883 -0.1338364 -0.01440976)
      PathPoint R_FDL_TENDONII-P2: R_Shank (-0.02086172 -0.2542129 -0.02087313)
      PathPoint R_FDL_TENDONII-P4: R_Foot (0.007594675 -0.02370601 -0.01193744)
      PathPoint R_FDL_TENDONII-P4_0: R_Foot (0.08308213 -0.01624308 0.02780549)
      PathPoint Muscle-insertion: R_Toes (0.03772437 -0.008078742 0.03487469)
      PathWrap: wrap_object=R_Ankle_Cylinder method=hybrid
    Millard2012EquilibriumMuscle R_FHL:
      PathPoint Muscle-origin: R_Shank (0.002077319 -0.1143375 0.01809238)
      PathPoint P2: R_Shank (-0.0267576 -0.2573242 0.002043836)
      PathPoint Muscle-insertion: R_Foot (0.03398208 -0.03232186 -0.009175013)
      PathPoint P4: R_Foot (0.07461472 -0.0172926 -0.04960834)
      PathPoint P4_0: R_Hallux (0.02387819 -0.001000402 -0.003470109)
      PathWrap: wrap_object=R_Ankle_Cylinder method=hybrid
    Millard2012EquilibriumMuscle R_GMax:
      PathPoint Muscle-origin: Pelvis (-0.08505434 0.06777517 0.03596281)
      PathPoint R_GMax_central-P2: Pelvis (-0.06306886 -0.02746222 0.09625326)
      PathPoint Muscle-insertion: R_Thigh (-0.007265638 -0.1015651 0.03109641)
    Millard2012EquilibriumMuscle R_GMed:
      PathPoint Muscle-origin: Pelvis (-0.115631 0.1321407 0.09203465)
      PathPoint P2: Pelvis (-0.07622988 0.05771681 0.1147688)
      PathPoint Muscle-insertion: R_Thigh (-0.008593622 0.007783184 0.05261033)
    Millard2012EquilibriumMuscle R_GMin:
      PathPoint Muscle-origin: Pelvis (-0.08898766 0.1059869 0.06655358)
      PathPoint Muscle-insertion: R_Thigh (-0.008210663 0.01243495 0.04588401)
    Millard2012EquilibriumMuscle R_GRA:
      PathPoint Muscle-origin: Pelvis (0.05585965 -0.02409542 0.006973842)
      PathPoint P2: Pelvis (0.07108121 -0.07784726 0.02080386)
      PathPoint Muscle-insertion: R_Shank (0.005770778 -0.02820058 -0.03009792)
    Millard2012EquilibriumMuscle R_ILI:
      PathPoint Muscle-origin: Pelvis (-0.09873228 0.123842 0.067502)
      PathPoint P2: Pelvis (-0.005201246 0.03354964 0.06622249)
      PathPoint P4: R_Thigh (0.009862499 -0.03869235 0.0140723)
      PathPoint Muscle-insertion: R_Thigh (0.001037227 -0.064965 0.018272)
      PathWrap: wrap_object=rFemoralNeck_Cylinder_Y method=hybrid range=(2 3)
    Millard2012EquilibriumMuscle R_LG:
      PathPoint Muscle-origin: R_Thigh (-0.007419726 -0.2573269 0.01883662)
      PathPoint P2: R_Shank (-0.04575836 -0.07680284 0.02216432)
      PathPoint Muscle-insertion: R_Foot (-0.03347458 -0.022644 0.019407)
      PathWrap: wrap_object=rProxTibiaCylinder method=hybrid
    Millard2012EquilibriumMuscle R_MG:
      PathPoint Muscle-origin: R_Thigh (-0.003296541 -0.2511303 -0.005775817)
      PathPoint P2: R_Shank (-0.04297241 -0.09298686 -0.0177013)
      PathPoint Muscle-insertion: R_Foot (-0.03278443 -0.02236 0.014701)
      PathWrap: wrap_object=rProxTibiaCylinder method=hybrid range=(1 2)
    Millard2012EquilibriumMuscle R_PB:
      PathPoint Muscle-origin: R_Shank (0.0065503 -0.1401243 0.02604324)
      PathPoint Muscle-insertion: R_Foot (-0.005202905 -0.007804663 0.02194267)
      PathPoint P3: R_Foot (0.03523042 -0.01959957 0.03311835)
    Millard2012EquilibriumMuscle R_PIRI:
      PathPoint Muscle-origin: Pelvis (-0.0720419 0.0304249 0.02139935)
      PathPoint Muscle-insertion: R_Thigh (-0.01493944 0.009364194 0.04335986)
    Millard2012EquilibriumMuscle R_PL:
      PathPoint P1: R_Shank (-0.01561682 -0.059172 0.030187)
      PathPoint Muscle-origin: R_Shank (-0.007639744 -0.2715452 0.01417289)
      PathPoint Muscle-insertion: R_Foot (0.03843736 -0.01686406 0.02861654)
    Millard2012EquilibriumMuscle R_RF:
      PathPoint Muscle-origin: Pelvis (-0.02446728 0.04950965 0.07503179)
      PathPoint P2: Pelvis (0.0311526 -0.0111004 0.08089509)
      PathPoint P3: R_Thigh (0.02545426 -0.2563164 0.02077346)
      PathPoint Muscle-insertion: R_Shank (0.02984359 -0.05109835 0.008003989)
      PathWrap: wrap_object=rFemoralCondyles_Cylinder2 method=hybrid
    Millard2012EquilibriumMuscle R_SAR:
      PathPoint Muscle-origin: Pelvis (-0.05800349 0.101328 0.125254)
      PathPoint P2: R_Thigh (0.03270396 0.00371691 0.03081096)
      PathPoint P4_0: R_Shank (0.0138253 0.005799645 -0.02666665)
      PathPoint Muscle-insertion: R_Shank (0.01205466 -0.041798 -0.015005)
    Millard2012EquilibriumMuscle R_SM:
      PathPoint Muscle-origin: Pelvis (0.006018297 -0.07729272 0.06965249)
      PathPoint P3: R_Thigh (-0.02298911 -0.22023 -0.009283257)
      PathPoint Muscle-insertion: R_Shank (-0.02026134 -0.02902774 -0.01752869)
      PathWrap: wrap_object=rFemoralMedialCondyle_Sphere method=hybrid
    Millard2012EquilibriumMuscle R_SOL:
      PathPoint Muscle-origin: R_Shank (-0.01231124 -0.06078835 0.0274668)
      PathPoint Muscle-insertion: R_Foot (-0.03185305 -0.01633078 0.01567235)
    Millard2012EquilibriumMuscle R_ST:
      PathPoint Muscle-origin: Pelvis (0.01292164 -0.07726349 0.05513079)
      PathPoint P3: R_Thigh (-0.0246262 -0.2218552 -0.02075158)
      PathPoint P4: R_Shank (-0.01838996 -0.03269753 -0.02947665)
      PathPoint Muscle-insertion: R_Shank (0.01056992 -0.06799 -0.01705369)
      PathWrap: wrap_object=rFemoralMedialCondyle_Sphere method=hybrid
    Millard2012EquilibriumMuscle R_TA:
      PathPoint Muscle-origin: R_Shank (0.02003342 -0.04634216 0.02062145)
      PathPoint P2: R_Shank (0.02513456 -0.1511629 -0.004018129)
      PathPoint Muscle-insertion: R_Shank (0.01953169 -0.2496865 -0.01565728)
      PathPoint P4: R_Foot (0.04100289 -0.01514543 -0.02621883)
    Millard2012EquilibriumMuscle R_TP:
      PathPoint Muscle-origin: R_Shank (-0.001140369 -0.05351176 0.009598329)
      PathPoint P2: R_Shank (-0.008363441 -0.2213106 -0.01943377)
      PathPoint P4: R_Shank (-0.01078863 -0.2648685 -0.03981251)
      PathPoint P3: R_Foot (0.02122714 -0.02853635 -0.03066815)
    Millard2012EquilibriumMuscle R_PECT:
      PathPoint Muscle-origin: Pelvis (0.04547755 0.001480701 0.02149886)
      PathPoint P2: Pelvis (0.04388482 -0.06792948 0.07200951)
      PathPoint Muscle-insertion: R_Thigh (0.006324623 -0.07313627 0.0165346)
    Millard2012EquilibriumMuscle R_VI:
      PathPoint Muscle-origin: R_Thigh (0.01154325 -0.05775258 0.0387544)
      PathPoint P2: R_Thigh (0.02470984 -0.1553029 0.03007405)
      PathPoint P3: R_Thigh (0.02873271 -0.2683319 0.01796807)
      PathPoint Muscle-insertion: R_Shank (0.02888565 -0.05375015 0.007375675)
      PathWrap: wrap_object=rFemoralCondyles_Cylinder2 method=hybrid
    Millard2012EquilibriumMuscle R_VL:
      PathPoint Muscle-origin: R_Thigh (0.01327211 -0.003694094 0.04711346)
      PathPoint P2: R_Thigh (0.02331472 -0.1584833 0.04051779)
      PathPoint P3: R_Thigh (0.02171531 -0.2275254 0.03141653)
      PathPoint Muscle-insertion: R_Shank (0.02907823 -0.05123345 0.008608241)
      PathWrap: wrap_object=rFemoralCondyles_Cylinder2 method=hybrid
    Millard2012EquilibriumMuscle R_VMed:
      PathPoint Muscle-origin: R_Thigh (0.006828524 -0.03697465 0.02371343)
      PathPoint P2: R_Thigh (0.0295254 -0.1160824 0.0191079)
      PathPoint P3: R_Thigh (0.02724415 -0.2647748 0.008979124)
      PathPoint Muscle-insertion: R_Shank (0.0301295 -0.0532618 0.00768126)
      PathWrap: wrap_object=rFemoralCondyles_Cylinder2 method=hybrid
