# OpenSim document version 40600
Model Gibbon:
  gravity: 0 0 -9.8066
  Ground
  BodySet:
    Body pelvis: mass=0.057324 [kg] mass_center=(-0.013157 0.030457 0.0018758)
        inertia=(9.3832e-5 4.1544e-5 7.0346e-5 1.9499e-5 1.2264e-6 -1.1371e-6) meshes=(Pelvisbone.obj Pelvis.obj)
      WrapCylinder rIschium_Cylinder: xyz_body_rotation=(-2.802415 0.5350252 -2.699047)
          translation=(-0.004403973 -0.0378151 0.03191416) quadrant=-x radius=0.011 length=0.0585
      WrapEllipsoid rPelvis_ellipsoid: xyz_body_rotation=(-1.5 0.9 -0.5)
          translation=(0.0003172194 -0.03775543 0.03274669) quadrant=z dimensions=(0.016 0.029 0.014)
    Body thigh_l: mass=0.030555 mass_center=(0.0025057 -0.092937 -0.0046437)
        inertia=(0.00012967 2.0861e-6 0.00012839 -5.252e-7 1.3316e-7 7.4589e-6)
        meshes=(L_femur.obj l_patella.obj L_thigh.obj)
    Body shank_l: mass=0.01947 mass_center=(0.0035598 -0.077222 0.0018925)
        inertia=(5.8291e-5 8.1311e-7 5.8326e-5 -2.7244e-7 -4.5873e-8 2.0827e-6)
        meshes=(L_shankBones.obj l_fibula.obj L_shank.obj)
    Body foot_l: mass=0.0036841 mass_center=(0.036995 -0.0053103 -0.00087351)
        inertia=(1.4914e-7 1.0342e-6 1.0613e-6 -5.5891e-8 6.2797e-8 -5.171e-8)
        meshes=(L_metatarsals.obj lMetatarsals.obj l_calc.obj l_distHallux.obj l_halluxMeta.obj L_footmass.obj)
    Body toes_l: mass=0.0049236 mass_center=(0.015474 0.12954 0.14111)
        inertia=(0.0001773 9.7235e-5 8.1481e-5 2.6463e-6 2.4052e-6 -8.8005e-5)
        meshes=(L_toesbone.obj L_halluxMass.obj L_toesmass.obj)
    Body thigh_r: mass=0.030555 mass_center=(0.0025057 -0.092937 0.0046437)
        inertia=(0.00012967 2.0861e-6 0.00012839 -5.252e-7 -1.3316e-7 -7.4589e-6)
        meshes=(patella.obj r_femur.obj r_thigh.obj)
      WrapSphere rFemoralMedialCondyle_Sphere: xyz_body_rotation=(-1.2 0.9 -1.9) translation=(0.003 -0.267 -0.015)
          quadrant=all radius=0.026
      WrapCylinder rFemoralneck: xyz_body_rotation=(-3.052285 -0.1327933 -1.499041)
          translation=(0.001363082 -0.002796768 0.004934788) quadrant=z radius=0.01 length=0.04
      WrapCylinder rFemoralneck2: xyz_body_rotation=(-3.052285 -0.1327933 -1.499041)
          translation=(-0.001158857 -0.003477822 0.007741098) quadrant=-y radius=0.01 length=0.02
      WrapCylinder rFemoralCondyles_Cylinder: xyz_body_rotation=(-3.052285 -0.1327933 -1.499041)
          translation=(0.0002989008 -0.1764857 0.00382527) quadrant=-y radius=0.01 length=0.03
      WrapCylinder rFemoralCondyles_Cylinder2: xyz_body_rotation=(3.074633 -0.1866334 -1.125073)
          translation=(0.004380499 -0.1858901 0.00550184) quadrant=y radius=0.01 length=0.03
    Body shank_r: mass=0.01947 mass_center=(0.0035598 -0.077222 -0.0018925)
        inertia=(5.8291e-5 8.1311e-7 5.8326e-5 -2.7244e-7 4.5873e-8 -2.0827e-6)
        meshes=(R_bones.obj r_fibula.obj R_shank.obj)
      WrapEllipsoid rDistalTibia_ellipsoid: xyz_body_rotation=(-0.6 0.8 -1.9) translation=(-0.01 -0.2780001 -0.022)
          quadrant=-z dimensions=(0.028 0.02 0.012)
      WrapCylinder rProxTibiaCylinder: xyz_body_rotation=(3.3 -0.061 -3.1)
          translation=(-0.002020571 -0.01873748 0.003070411) quadrant=x radius=0.011 length=0.034
    Body foot_r: mass=0.0036841 mass_center=(0.036995 -0.0053103 0.00087351)
        inertia=(1.4914e-7 1.0342e-6 1.0613e-6 -5.5891e-8 -6.2797e-8 5.171e-8)
        meshes=(R_footBone.obj r_calc.obj r_halluxmeta.obj r_metatarsals.obj R_foot.obj)
      WrapCylinder R_Ankle_Cylinder: xyz_body_rotation=(0.334936 -0.2029787 -0.7144791)
          translation=(0.001029163 0.0004696091 -0.005423796) quadrant=-x radius=0.008 length=0.02
    Body toes_r: mass=0.0023394 mass_center=(0.01945 -0.0049533 0.0058938)
        inertia=(2.5017e-7 5.6655e-7 5.3752e-7 1.916e-7 1.0696e-7 -8.1556e-8) meshes=(R_toesbones.obj R_halluxMass.obj)
    Body hallux_r: mass=0.00066368 mass_center=(0.015616 -0.00021944 -0.00040935)
        inertia=(5.3999e-9 4.289e-8 4.2815e-8 7.7854e-9 -4.8782e-9 1.0259e-9) meshes=(halluxr_bone.obj halluxr.obj)
  JointSet:
    CustomJoint pelvis: socket_parent_frame=ground_offset socket_child_frame=pelvis_offset
      Coordinate pelvis_flexion: default_value=0 range=(-3.1416 3.1416) clamped=true
      Coordinate pelvis_rotation: default_value=0 range=(-3.1416 3.1416) clamped=true
      Coordinate pelvis_adduction: default_value=0 range=(-3.1416 3.1416) clamped=true
      Coordinate pelvis_Tx: default_value=0 range=(-0.1 0.1) clamped=true
      Coordinate pelvis_Ty: default_value=0 range=(-0.1 0.1) clamped=true
      Coordinate pelvis_Tz: default_value=0 range=(-0.1 0.1) clamped=true
      PhysicalOffsetFrame ground_offset: socket_parent=/ground translation=(0 0 0) [meters]
      PhysicalOffsetFrame pelvis_offset: socket_parent=/bodyset/pelvis translation=(0 0 0)
      SpatialTransform:
        TransformAxis rotation1: coordinates=pelvis_flexion axis=(0 0 1) LinearFunction(coefficients=1 0)
        TransformAxis rotation2: coordinates=pelvis_rotation axis=(0 1 0) LinearFunction(coefficients=1 0)
        TransformAxis rotation3: coordinates=pelvis_adduction axis=(1 0 0) LinearFunction(coefficients=1 0)
        TransformAxis translation1: coordinates=pelvis_Tx axis=(1 0 0) LinearFunction(coefficients=1 0)
        TransformAxis translation2: coordinates=pelvis_Ty axis=(0 1 0) LinearFunction(coefficients=1 0)
        TransformAxis translation3: coordinates=pelvis_Tz axis=(0 0 1) LinearFunction(coefficients=1 0)
    CustomJoint hip_l: socket_parent_frame=pelvis_offset socket_child_frame=thigh_l_offset
      Coordinate hip_l_flexion: default_value=0 range=(-3.1416 3.1416) clamped=true
      Coordinate hip_l_rotation: default_value=0 range=(-3.1416 3.1416) clamped=true
      Coordinate hip_l_adduction: default_value=0 range=(-3.1416 3.1416) clamped=true
      PhysicalOffsetFrame pelvis_offset: socket_parent=/bodyset/pelvis translation=(-1.6686e-18 -1.6686e-18 -0.03607)
      PhysicalOffsetFrame thigh_l_offset: socket_parent=/bodyset/thigh_l translation=(0 0 0)
      SpatialTransform:
        TransformAxis rotation1: coordinates=hip_l_flexion axis=(0 0 1) LinearFunction(coefficients=1 0)
        TransformAxis rotation2: coordinates=hip_l_rotation axis=(0 1 0) LinearFunction(coefficients=1 0)
        TransformAxis rotation3: coordinates=hip_l_adduction axis=(1 0 0) LinearFunction(coefficients=1 0)
        TransformAxis translation1: axis=(1 0 0)
        TransformAxis translation2: axis=(0 1 0)
        TransformAxis translation3: axis=(0 0 1)
    PinJoint knee_l: socket_parent_frame=thigh_l_offset socket_child_frame=shank_l_offset
      Coordinate l_knee_flexion: default_value=0 range=(-1.6 0)
      PhysicalOffsetFrame thigh_l_offset: socket_parent=/bodyset/thigh_l translation=(1.644e-17 -0.1777 -1e-8)
          orientation=(0.099788 2e-8 -2e-8) [radians]
      PhysicalOffsetFrame shank_l_offset: socket_parent=/bodyset/shank_l translation=(0 0 0)
    PinJoint ankle_l: socket_parent_frame=shank_l_offset socket_child_frame=foot_l_offset
      Coordinate l_ankle_flexion: default_value=0 range=(-1 1)
      PhysicalOffsetFrame shank_l_offset: socket_parent=/bodyset/shank_l translation=(-0.0011131 -0.18334 -0.0015234)
          orientation=(0.31467 -1e-8 3e-8)
      PhysicalOffsetFrame foot_l_offset: socket_parent=/bodyset/foot_l translation=(0 0 0)
    PinJoint mtp_l: socket_parent_frame=foot_l_offset socket_child_frame=toes_l_offset
      Coordinate l_mtp_flexion: default_value=0 range=(-1 1)
      PhysicalOffsetFrame foot_l_offset: socket_parent=/bodyset/foot_l translation=(0.063367 5.2016e-9 0.0029625)
          orientation=(-1.058 -0.02651 -0.084522)
      PhysicalOffsetFrame toes_l_offset: socket_parent=/bodyset/toes_l translation=(0 0 0)
    CustomJoint hip_r: socket_parent_frame=pelvis_offset socket_child_frame=thigh_r_offset
      Coordinate hip_r_flexion: default_value=3.406389e-16 range=(-3.1416 3.1416) clamped=true
      Coordinate hip_r_rotation: default_value=0 range=(-3.1416 3.1416) clamped=true
      Coordinate hip_r_adduction: default_value=0 range=(-3.1416 3.1416) clamped=true
      PhysicalOffsetFrame pelvis_offset: socket_parent=/bodyset/pelvis translation=(1.6686e-18 1.6686e-18 0.03607)
      PhysicalOffsetFrame thigh_r_offset: socket_parent=/bodyset/thigh_r translation=(0 0 0)
      SpatialTransform:
        TransformAxis rotation1: coordinates=hip_r_flexion axis=(0 0 1) LinearFunction(coefficients=1 0)
        TransformAxis rotation2: coordinates=hip_r_rotation axis=(0 1 0) LinearFunction(coefficients=1 0)
        TransformAxis rotation3: coordinates=hip_r_adduction axis=(1 0 0) LinearFunction(coefficients=1 0)
        TransformAxis translation1: axis=(1 0 0)
        TransformAxis translation2: axis=(0 1 0)
        TransformAxis translation3: axis=(0 0 1)
    PinJoint knee_r: socket_parent_frame=thigh_r_offset socket_child_frame=shank_r_offset
      Coordinate r_knee_flexion: default_value=-0.07294833 range=(-1.6 0)
      PhysicalOffsetFrame thigh_r_offset: socket_parent=/bodyset/thigh_r translation=(-1.644e-17 -0.1777 -1.644e-17)
          orientation=(-0.099788 2e-8 -2e-8)
      PhysicalOffsetFrame shank_r_offset: socket_parent=/bodyset/shank_r translation=(0 0 0)
    PinJoint ankle_r: socket_parent_frame=shank_r_offset socket_child_frame=foot_r_offset
      Coordinate r_ankle_flexion: default_value=-0.006289308 range=(-1 1)
      PhysicalOffsetFrame shank_r_offset: socket_parent=/bodyset/shank_r translation=(-0.0011131 -0.18334 0.0015234)
          orientation=(-0.31467 -3e-8 1e-8)
      PhysicalOffsetFrame foot_r_offset: socket_parent=/bodyset/foot_r translation=(0 0 0)
    PinJoint mtp_r: socket_parent_frame=foot_r_offset socket_child_frame=toes_r_offset
      Coordinate r_mtp_flexion: default_value=0.003076923 range=(-1 1)
      PhysicalOffsetFrame foot_r_offset: socket_parent=/bodyset/foot_r translation=(0.063367 -3.4987e-9 -0.0029625)
          orientation=(1.058 0.02651 -0.084522)
      PhysicalOffsetFrame toes_r_offset: socket_parent=/bodyset/toes_r translation=(0 0 0)
    PinJoint hallux_r: socket_parent_frame=foot_r_offset socket_child_frame=hallux_r_offset
      Coordinate r_hallux_flexion: default_value=0.003076923 range=(-1 1)
      PhysicalOffsetFrame foot_r_offset: socket_parent=/bodyset/foot_r translation=(0.051373 0.00082108 -0.038468)
          orientation=(-1.2697 0.20395 0.61403)
      PhysicalOffsetFrame hallux_r_offset: socket_parent=/bodyset/hallux_r translation=(0 0 0)
  ConstraintSet:
    CoordinateCouplerConstraint: independent_coordinate_names=r_mtp_flexion dependent_coordinate_name=r_hallux_flexion
        coupled_coordinates_function=LinearFunction(coefficients=1 0)
  ForceSet:
    Millard2012EquilibriumMuscle [values shared by the 36 below unless stated]: max_isometric_force=1
        optimal_fiber_length=1 tendon_slack_length=1 pennation_angle_at_optimal=0 [radians] default_fiber_length=1
        minimum_activation=0.01
      ActiveForceLengthCurve: min_norm_active_fiber_length=0.4441 transition_norm_fiber_length=0.73
          max_norm_active_fiber_length=1.8123 shallow_ascending_slope=0.8616 minimum_value=0
      ForceVelocityCurve: concentric_slope_at_vmax=0 concentric_slope_near_vmax=0.25 isometric_slope=5
          eccentric_slope_at_vmax=0 eccentric_slope_near_vmax=0.15 max_eccentric_velocity_force_multiplier=1.4
          concentric_curviness=0.6 eccentric_curviness=0.9
      FiberForceLengthCurve: strain_at_zero_force=0 strain_at_one_norm_force=0.6
      TendonForceLengthCurve: strain_at_one_norm_force=0.049
    Millard2012EquilibriumMuscle R_AM:
      PathPoint Muscle-origin: pelvis (0.01575678 -0.01459598 0.003011108)
      PathPoint Muscle-insertion: thigh_r (-0.003439488 -0.1291936 0.001851455)
    Millard2012EquilibriumMuscle R_AB:
      PathPoint Muscle-origin: pelvis (0.01863127 0.001360397 0.004390225)
      PathPoint Muscle-insertion: thigh_r (-0.001243143 -0.05518166 0.009205844)
    Millard2012EquilibriumMuscle R_AL:
      PathPoint Muscle-origin: pelvis (0.01868731 -0.003026737 0.003092338)
      PathPoint Muscle-insertion: thigh_r (-0.001448519 -0.0810414 0.004331962)
    Millard2012EquilibriumMuscle R_BFS:
      PathPoint Muscle-origin: thigh_r (-0.002767519 -0.1355351 0.002575803)
      PathPoint Muscle-insertion: shank_r (-0.009618805 -0.02646754 0.01181301)
      PathWrap: wrap_object=rFemoralCondyles_Cylinder method=hybrid
    Millard2012EquilibriumMuscle R_BFL:
      PathPoint Muscle-origin: pelvis (-0.007354613 -0.02713498 0.02661003)
      PathPoint Muscle-insertion: shank_r (-0.009869947 -0.02673508 0.0115337)
      PathWrap: wrap_object=rFemoralCondyles_Cylinder method=hybrid
    Millard2012EquilibriumMuscle R_EDL_TENDONII:
      PathPoint Muscle-origin: shank_r (0.00566064 -0.0187631 0.00957403)
      PathPoint P2: shank_r (0.007344756 -0.1807494 -0.0008511211)
      PathPoint P3: foot_r (0.06584492 0.004582506 0.0008282835)
      PathPoint Muscle-insertion: toes_r (0.04277795 -0.02350088 -0.00822915)
    Millard2012EquilibriumMuscle R_EDL_TENDONIII:
      PathPoint Muscle-origin: shank_r (0.00566064 -0.0187631 0.00957403)
      PathPoint R_EDL_TENDONII-P2: shank_r (0.007344756 -0.1807494 -0.0008511211)
      PathPoint R_EDL_TENDONII-P3: foot_r (0.06532117 -0.00259019 0.007023369)
      PathPoint Muscle-insertion: toes_r (0.04866693 -0.0202876 0.0002848335)
    Millard2012EquilibriumMuscle R_EDL_TENDONIV:
      PathPoint Muscle-origin: shank_r (0.00566064 -0.0187631 0.00957403)
      PathPoint R_EDL_TENDONII-P2: shank_r (0.007344756 -0.1807494 -0.0008511211)
      PathPoint R_EDL_TENDONII-P3: foot_r (0.06102542 -0.008778014 0.01027109)
      PathPoint Muscle-insertion: toes_r (0.04405267 -0.01063259 0.008598097)
    Millard2012EquilibriumMuscle R_EDL_TENDONV:
      PathPoint Muscle-origin: shank_r (0.00566064 -0.0187631 0.00957403)
      PathPoint R_EDL_TENDONII-P2: shank_r (0.007344756 -0.1807494 -0.0008511211)
      PathPoint R_EDL_TENDONII-P3: foot_r (0.05172447 -0.01197814 0.01425648)
      PathPoint Muscle-insertion: toes_r (0.02259116 -0.0007155407 0.01815995)
    Millard2012EquilibriumMuscle R_EHL:
      PathPoint P1: shank_r (-0.0004665977 -0.1246674 0.0108128)
      PathPoint P2: shank_r (0.01081424 -0.1789489 -0.007080595)
      PathPoint P4: foot_r (0.05272714 0.00138201 -0.04631917)
      PathPoint P5: hallux_r (0.03171362 -0.002696717 0.002522151)
    Millard2012EquilibriumMuscle R_FDL_TENDONII:
      PathPoint Muscle-origin: shank_r (0.002112021 -0.06933313 -0.006194574)
      PathPoint P2: shank_r (-0.007654398 -0.1759145 -0.01012213)
      PathPoint P4: foot_r (0.007941712 -0.0101184 -0.003336387)
      PathPoint P4_0: foot_r (0.06246638 -0.003146054 -0.005395991)
      PathPoint Muscle-insertion: toes_r (0.03668699 -0.02315508 -0.007933606)
      PathWrap pathwrap_0: wrap_object=R_Ankle_Cylinder method=hybrid range=(2 3)
    Millard2012EquilibriumMuscle R_FDL_TENDONIII:
      PathPoint Muscle-origin: shank_r (0.002112021 -0.06933313 -0.006194574)
      PathPoint R_FDL_TENDONII-P2: shank_r (-0.007654398 -0.1759145 -0.01012213)
      PathPoint R_FDL_TENDONII-P4: foot_r (0.007941712 -0.0101184 -0.003336387)
      PathPoint R_FDL_TENDONII-P4_0: foot_r (0.06312911 -0.006697154 -0.000166306)
      PathPoint Muscle-insertion: toes_r (0.04707274 -0.02222034 0.0009463383)
      PathWrap pathwrap_0: wrap_object=R_Ankle_Cylinder method=hybrid range=(-1 3)
    Millard2012EquilibriumMuscle R_FDL_TENDONIV:
      PathPoint Muscle-origin: shank_r (0.002112021 -0.06933313 -0.006194574)
      PathPoint R_FDL_TENDONII-P2: shank_r (-0.007654398 -0.1759145 -0.01012213)
      PathPoint R_FDL_TENDONII-P4: foot_r (0.007941712 -0.0101184 -0.003336387)
      PathPoint R_FDL_TENDONII-P4_0: foot_r (0.0578772 -0.01006703 0.00461243)
      PathPoint Muscle-insertion: toes_r (0.04142324 -0.01529005 0.009999393)
      PathWrap pathwrap_0: wrap_object=R_Ankle_Cylinder method=hybrid range=(1 3)
    Millard2012EquilibriumMuscle R_FDL_TENDONV:
      PathPoint Muscle-origin: shank_r (0.002112021 -0.06933313 -0.006194574)
      PathPoint R_FDL_TENDONII-P2: shank_r (-0.007654398 -0.1759145 -0.01012213)
      PathPoint R_FDL_TENDONII-P4: foot_r (0.007941712 -0.0101184 -0.003336387)
      PathPoint R_FDL_TENDONII-P4_0: foot_r (0.05107004 -0.01545855 0.007179304)
      PathPoint Muscle-insertion: toes_r (0.02147246 -0.003798084 0.01793315)
      PathWrap pathwrap_0: wrap_object=rDistalTibia_ellipsoid method=hybrid
    Millard2012EquilibriumMuscle R_FHL:
      PathPoint Muscle-origin: shank_r (-0.003166775 -0.07411655 0.01142598)
      PathPoint P2: shank_r (-0.009595976 -0.1815488 -0.0002900803)
      PathPoint Muscle-insertion: foot_r (0.02397845 -0.007958061 -0.01447802)
      PathPoint P4: foot_r (0.04949225 -0.003309371 -0.03323228)
      PathPoint P4_0: hallux_r (0.02982361 -0.004854067 0.002695733)
      PathWrap: wrap_object=R_Ankle_Cylinder method=hybrid
    Millard2012EquilibriumMuscle R_GMax:
      PathPoint Muscle-origin: pelvis (-0.03268609 0.05349097 0.02218138)
      PathPoint R_GMax_central-P3: pelvis (-0.03326103 0.01739807 0.03897511)
      PathPoint Muscle-insertion: thigh_r (-0.001339093 -0.04127983 0.01295723)
      PathWrap: wrap_object=rFemoralneck2 method=hybrid range=(2 3)
    Millard2012EquilibriumMuscle R_GMed:
      PathPoint Muscle-origin: pelvis (-0.02747679 0.08205573 0.03834458)
      PathPoint P2: pelvis (-0.02742318 0.05245756 0.05326752)
      PathPoint Muscle-insertion: thigh_r (0.001826803 0.002733628 0.02032495)
    Millard2012EquilibriumMuscle R_GMin:
      PathPoint Muscle-origin: pelvis (-0.02444513 0.06536417 0.03370271)
      PathPoint P2: pelvis (-0.02872051 0.03493924 0.04671388)
      PathPoint Muscle-insertion: thigh_r (-0.001701447 0.001037511 0.01879032)
    Millard2012EquilibriumMuscle R_GRA:
      PathPoint Muscle-origin: pelvis (0.01832609 -0.01090969 0.002406549)
      PathPoint P2: thigh_r (0.01229401 -0.06168119 -0.02720657)
      PathPoint P3: thigh_r (-0.003288637 -0.179107 -0.01525135)
      PathPoint Muscle-insertion: shank_r (0.008900487 -0.02142925 -0.005081834)
      PathWrap: wrap_object=rFemoralMedialCondyle_Sphere method=hybrid
    Millard2012EquilibriumMuscle R_ILI:
      PathPoint Muscle-origin: pelvis (-0.02271345 0.07348371 0.03610773)
      PathPoint P2: pelvis (0.00979873 0.007211872 0.03745083)
      PathPoint Muscle-insertion: thigh_r (-0.0009015431 -0.03712243 0.008809293)
      PathWrap: wrap_object=rFemoralneck method=hybrid range=(2 3)
    Millard2012EquilibriumMuscle R_LG:
      PathPoint Muscle-origin: thigh_r (-0.003372973 -0.1660823 0.00864448)
      PathPoint P2: shank_r (-0.02283798 -0.05434222 0.01059297)
      PathPoint Muscle-insertion: foot_r (-0.008709098 -0.0008763945 0.004083601)
      PathWrap: wrap_object=rProxTibiaCylinder method=hybrid
    Millard2012EquilibriumMuscle R_MG:
      PathPoint Muscle-origin: thigh_r (-0.001104704 -0.1650529 -0.005970753)
      PathPoint P2: shank_r (-0.02134869 -0.05333073 -0.007795763)
      PathPoint Muscle-insertion: foot_r (-0.01001533 0.001154089 0.004323542)
      PathWrap: wrap_object=rProxTibiaCylinder method=hybrid range=(1 2)
    Millard2012EquilibriumMuscle R_PB:
      PathPoint Muscle-origin: shank_r (-0.003859907 -0.1504525 0.01342387)
      PathPoint Muscle-insertion: foot_r (-0.00596016 -0.002928122 0.008945842)
      PathPoint P3: foot_r (0.02207993 -0.01520182 0.005274257)
    Millard2012EquilibriumMuscle R_PIRI:
      PathPoint Muscle-origin: pelvis (-0.02948329 0.03733189 0.01470861)
      PathPoint Muscle-insertion: thigh_r (-0.0005320599 0.003174918 0.01533741)
    Millard2012EquilibriumMuscle R_PL:
      PathPoint P1: shank_r (-0.005753707 -0.02955545 0.01296223)
      PathPoint Muscle-origin: shank_r (-0.007036 -0.1830259 0.01109972)
      PathPoint Muscle-insertion: foot_r (0.02219098 -0.01490082 0.007010239)
    Millard2012EquilibriumMuscle R_RF:
      PathPoint Muscle-origin: pelvis (-0.01458332 0.04915433 0.04554435)
      PathPoint P2: pelvis (0.01248128 0.0004494859 0.04570275)
      PathPoint P3: thigh_r (0.01342529 -0.1701643 0.004622572)
      PathPoint Muscle-insertion: shank_r (0.01105029 -0.02528324 0.005114946)
      PathWrap pathwrap_0: wrap_object=rFemoralCondyles_Cylinder2 method=hybrid range=(3 -1)
    Millard2012EquilibriumMuscle R_SAR:
      PathPoint Muscle-origin: pelvis (-0.02480507 0.07207569 0.04748473)
      PathPoint P2: thigh_r (0.02208125 -0.02427075 0.009238589)
      PathPoint P4: thigh_r (0.005437773 -0.1349391 -0.0142827)
      PathPoint P4_0: shank_r (0.00483543 0.002527494 -0.0130478)
      PathPoint Muscle-insertion: shank_r (0.01040764 -0.02703408 0.00178899)
      PathWrap: wrap_object=rFemoralMedialCondyle_Sphere method=hybrid
    Millard2012EquilibriumMuscle R_SM:
      PathPoint Muscle-origin: pelvis (-0.01057473 -0.024374 0.03383916)
      PathPoint P3: thigh_r (-0.009910789 -0.1579342 -0.01517607)
      PathPoint Muscle-insertion: shank_r (0.003767494 -0.02477344 -0.006031498)
    Millard2012EquilibriumMuscle R_SOL:
      PathPoint Muscle-origin: shank_r (-0.008491344 -0.02854561 0.008054628)
      PathPoint Muscle-insertion: foot_r (-0.009915511 -3.778444e-5 0.004067502)
    Millard2012EquilibriumMuscle R_ST:
      PathPoint Muscle-origin: pelvis (-0.004859154 -0.02980764 0.01952685)
      PathPoint P3: thigh_r (-0.008200906 -0.1560961 -0.02070982)
      PathPoint P4: shank_r (0.006708916 -0.01152335 -0.009055944)
      PathPoint Muscle-insertion: shank_r (0.009722652 -0.02994778 -0.001375921)
    Millard2012EquilibriumMuscle R_TA:
      PathPoint Muscle-origin: shank_r (0.008181262 -0.02400131 0.009098941)
      PathPoint P2: shank_r (0.01419997 -0.1213874 -0.001276059)
      PathPoint Muscle-insertion: shank_r (0.009907553 -0.161622 -0.005701933)
      PathPoint P4: foot_r (0.02358103 0.003700954 -0.00705891)
    Millard2012EquilibriumMuscle R_TP:
      PathPoint Muscle-origin: shank_r (-0.005240898 -0.02070364 -0.004529749)
      PathPoint P2: shank_r (-0.0003987497 -0.09206971 -0.004710566)
      PathPoint P4: foot_r (-0.006689194 0.01434421 -0.002207707)
      PathPoint P3: foot_r (0.01952065 -0.002622907 -0.01272222)
      PathWrap: wrap_object=R_Ankle_Cylinder method=hybrid
    Millard2012EquilibriumMuscle R_PECT:
      PathPoint Muscle-origin: pelvis (0.01716217 0.002190657 0.007312201)
      PathPoint P2: pelvis (0.0110361 -0.03042297 0.03008025)
      PathPoint Muscle-insertion: thigh_r (-0.0007252403 -0.03970733 0.01115313)
    Millard2012EquilibriumMuscle R_VI:
      PathPoint Muscle-origin: thigh_r (0.009055732 -0.02881934 0.01411696)
      PathPoint P3: thigh_r (0.01115507 -0.1694696 0.002429169)
      PathPoint Muscle-insertion: shank_r (0.01184595 -0.0241609 0.00304526)
      PathWrap: wrap_object=rFemoralCondyles_Cylinder2 method=hybrid range=(2 3)
    Millard2012EquilibriumMuscle R_VL:
      PathPoint Muscle-origin: thigh_r (0.01014082 -0.01108213 0.02033885)
      PathPoint P2: thigh_r (0.00953161 -0.1086421 0.02125748)
      PathPoint P3: thigh_r (0.0123859 -0.169539 0.008762371)
      PathPoint Muscle-insertion: shank_r (0.01205646 -0.02389266 0.004151962)
      PathWrap: wrap_object=rFemoralCondyles_Cylinder2 method=hybrid range=(3 4)
    Millard2012EquilibriumMuscle R_VMed:
      PathPoint Muscle-origin: thigh_r (0.007535285 -0.01973719 0.008846923)
      PathPoint P2: thigh_r (0.01097666 -0.09854519 -0.007267724)
      PathPoint P3: thigh_r (0.01079247 -0.1752116 -0.001459896)
      PathPoint Muscle-insertion: shank_r (0.0122153 -0.02385858 0.003162195)
      PathWrap: wrap_object=rFemoralCondyles_Cylinder2 method=hybrid range=(3 4)
