# OpenSim document version 40600
Model Gorilla:
  gravity: 0 0 -9.8066
  Ground
  BodySet:
    Body Pelvis: mass=0.9981 [kg] mass_center=(-0.035619 0.058086 0.098737)
        inertia=(0.014635 0.0056556 0.016128 0.0057299 0.0004207 -0.0019477)
        meshes=(PelvisLeft.obj Pelvis.obj sacrum.obj BodyMass.obj pelvisSegment.obj)
      WrapCylinder rIschium_Cylinder: xyz_body_rotation=(-3.1 0.59 3.5) translation=(0.034 -0.07 0.057) quadrant=-x
          radius=0.011 length=0.0785
      WrapEllipsoid rPelvis_ellipsoid: xyz_body_rotation=(-1.5 0.9 -0.5) translation=(0.005 0.009 0.08) quadrant=z
          dimensions=(0.016 0.029 0.014)
    Body L_Thigh: mass=1.032 mass_center=(0.0015128 -0.20783 -0.027389)
        inertia=(0.02559 0.0011871 0.024862 0.00066594 -2.723e-5 0.0019782)
        meshes=(lFemurbone.obj l_patella.obj lThigh.obj)
    Body L_Shank: mass=0.43763 mass_center=(0.00675 -0.16377 0.0010807)
        inertia=(0.0060828 0.00020935 0.0060302 -0.00010709 9.3266e-6 0.00029697)
        meshes=(lShankboneFib.obj lShankbone.obj lShank.obj)
    Body L_Foot: mass=0.076085 mass_center=(0.08903 -0.012155 0.015456)
        inertia=(5.0618e-5 0.00011603 0.00011396 6.4726e-6 2.1657e-6 -2.0031e-5)
        meshes=(lFootbone.obj l_halluxToe.obj lcalc.obj lmeta1st.obj lmetatarsals.obj lnavicular.obj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)
    Body L_Toes: mass=0.027672 mass_center=(0.026825 0.0067935 -0.032118)
        inertia=(1.023e-5 2.5843e-5 1.6438e-5 -5.5717e-8 -2.6431e-6 1.179e-7) meshes=(lDigitsbone.obj lDigits.obj)
    Body R_Thigh: mass=1.032 mass_center=(0.0015128 -0.20783 0.027389)
        inertia=(0.02559 0.0011871 0.024862 0.00066594 2.723e-5 -0.0019782)
        meshes=(rThighbone.obj patella.obj rThigh.obj)
      WrapCylinder rFemoralNeck_Cylinder_Y: xyz_body_rotation=(0.1 0 -0.7) translation=(0 -0.008 0.01) quadrant=x
          radius=0.021 length=0.052
      WrapCylinder rFemoralNeck: xyz_body_rotation=(0.1 0 -0.7) translation=(0.01254738 -0.06417113 0.1003589)
          quadrant=-y radius=0.028 length=0.06
      WrapSphere rFemoralMedialCondyle_Sphere: active=false xyz_body_rotation=(-1.2 0.9 -1.9)
          translation=(-0.01707774 -0.3912384 -0.02944219) quadrant=all radius=0.026
      WrapCylinder rFemoralCondyles_Cylinder: xyz_body_rotation=(3.503 -0.133 -1.5)
          translation=(0.001072272 -0.2572489 0.009351953) quadrant=-y radius=0.028 length=0.074
      WrapCylinder rFemoralCondyles_Cylinder2: xyz_body_rotation=(-3.1219 -0.1046258 -1.178769)
          translation=(0.0141572 -0.4236547 0.004483912) quadrant=y radius=0.03 length=0.095
      WrapCylinder rFemoralCondyles_Cylinder2_0: xyz_body_rotation=(3.095837 -0.1424089 -1.203517)
          translation=(-0.01221159 -0.3804906 0.00414766) quadrant=-y radius=0.0332 length=0.13
    Body R_Shank: mass=0.43763 mass_center=(0.0067499 -0.16377 -0.0010807)
        inertia=(0.0060828 0.00020935 0.0060302 -0.00010709 -9.3266e-6 -0.00029697)
        meshes=(rShankboneFib.obj rShankbone.obj rShank.obj)
      WrapCylinder rProxTibiaCylinder: active=false xyz_body_rotation=(-3.116895 -0.07735087 -3.108274)
          translation=(-0.02079546 -0.05722491 0.003994097) quadrant=x radius=0.032 length=0.1
    Body R_Foot: mass=0.008796 mass_center=(0.12651 0.0030185 -0.11163)
        inertia=(1.0242e-6 2.3952e-6 1.7596e-6 -1.8672e-7 9.2354e-7 3.4278e-8)
        meshes=(calc.obj meta1st.obj metatarsals.obj navicular.obj rFootbones.obj rFootmass.obj)
      WrapCylinder R_Ankle_Cylinder: xyz_body_rotation=(0.1657591 -0.05642532 -0.8042964)
          translation=(-0.001916752 0.005582265 -0.0150492) quadrant=-y radius=0.022 length=0.062
      WrapCylinder rPosteriorMetarsalHead_Cylinder: active=false xyz_body_rotation=(-2.230702 0.06341907 -0.06696843)
          translation=(0.1450749 -0.02131775 -0.02169978) quadrant=-y radius=0.01 length=0.07
    Body R_Toes: mass=0.027672 mass_center=(0.026825 0.0067935 0.032118)
        inertia=(1.023e-5 2.5843e-5 1.6438e-5 -5.5717e-8 2.6431e-6 -1.179e-7) meshes=(rDigitsbone.obj rDigitsmass.obj)
    Body R_Hallux: mass=0.0087497 mass_center=(0.02681 0.00050519 0.0046524)
        inertia=(5.5999e-7 2.4548e-6 2.1421e-6 -1.5261e-9 -5.6109e-7 -3.9219e-8)
        meshes=(halluxr_bone.obj rFootmass.obj)
  JointSet:
    CustomJoint ground_pelvis: socket_parent_frame=ground_offset socket_child_frame=Pelvis_offset
      Coordinate Roll: default_value=0 range=(-1.5708 1.5708) clamped=true
      Coordinate Pitch: default_value=0 range=(-1.5708 1.5708) clamped=true
      Coordinate Tilt: default_value=0 range=(-1.5708 1.5708) clamped=true
      Coordinate pelvis_tx: default_value=2.102503e-7 range=(-1 2.5) clamped=true
      Coordinate pelvis_ty: default_value=2.102503e-7 range=(-1 2.5) clamped=true
      Coordinate pelvis_tz: default_value=2.102503e-7 range=(-1 2.5) clamped=true
      PhysicalOffsetFrame ground_offset: socket_parent=/ground translation=(0 0 0) [meters]
      PhysicalOffsetFrame Pelvis_offset: socket_parent=/bodyset/Pelvis translation=(0 0 0)
      SpatialTransform:
        TransformAxis rotation1: coordinates=Roll axis=(0 0 1) LinearFunction(coefficients=1 0)
        TransformAxis rotation2: coordinates=Pitch axis=(0 1 0) LinearFunction(coefficients=1 0)
        TransformAxis rotation3: coordinates=Tilt axis=(1 0 0) LinearFunction(coefficients=1 0)
        TransformAxis translation1: coordinates=pelvis_tx axis=(1 0 0) LinearFunction(coefficients=1 0)
        TransformAxis translation2: coordinates=pelvis_ty axis=(0 1 0) LinearFunction(coefficients=1 0)
        TransformAxis translation3: coordinates=pelvis_tz axis=(0 0 1) LinearFunction(coefficients=1 0)
    CustomJoint hip_l: socket_parent_frame=Pelvis_offset socket_child_frame=L_Thigh_offset
      Coordinate hip_l_flexion: default_value=-1.918329e-16 range=(-1.5708 1.5708) clamped=true
      Coordinate hip_l_rotation: default_value=0 range=(-1.5708 1.5708) clamped=true
      Coordinate hip_l_adduction: default_value=0 range=(-1.5708 1.5708) clamped=true
      PhysicalOffsetFrame Pelvis_offset: socket_parent=/bodyset/Pelvis translation=(-5.6996e-18 -5.6996e-18 -0.12321)
      PhysicalOffsetFrame L_Thigh_offset: socket_parent=/bodyset/L_Thigh translation=(0 0 0)
      SpatialTransform:
        TransformAxis rotation1: coordinates=hip_l_flexion axis=(0 0 1) LinearFunction(coefficients=1 0)
        TransformAxis rotation2: coordinates=hip_l_rotation axis=(0 1 0) LinearFunction(coefficients=1 0)
        TransformAxis rotation3: coordinates=hip_l_adduction axis=(1 0 0) LinearFunction(coefficients=1 0)
        TransformAxis translation1: axis=(1 0 0)
        TransformAxis translation2: axis=(0 1 0)
        TransformAxis translation3: axis=(0 0 1)
    PinJoint knee_l: socket_parent_frame=L_Thigh_offset socket_child_frame=L_Shank_offset
      Coordinate l_knee_flexion: default_value=0 range=(-2 0)
      PhysicalOffsetFrame L_Thigh_offset: socket_parent=/bodyset/L_Thigh translation=(1.7906e-17 -0.38709 1.7906e-17)
          orientation=(-0.022735 1e-8 -1e-8) [radians]
      PhysicalOffsetFrame L_Shank_offset: socket_parent=/bodyset/L_Shank translation=(0 0 0)
    PinJoint ankle_l: socket_parent_frame=L_Shank_offset socket_child_frame=L_Foot_offset
      Coordinate l_ankle_flexion: default_value=0 range=(-1 1)
      PhysicalOffsetFrame L_Shank_offset: socket_parent=/bodyset/L_Shank translation=(0.0010149 -0.40478 -0.013463)
          orientation=(0.31618 -0.070937 -0.18932)
      PhysicalOffsetFrame L_Foot_offset: socket_parent=/bodyset/L_Foot translation=(0 0 0)
    PinJoint mtp_l: socket_parent_frame=L_Foot_offset socket_child_frame=L_Toes_offset
      Coordinate l_mtp_flexion: default_value=0 range=(-1 1)
      PhysicalOffsetFrame L_Foot_offset: socket_parent=/bodyset/L_Foot translation=(0.1496 1.9634e-9 0.038032)
          orientation=(-1.0339 -0.18023 -0.21361)
      PhysicalOffsetFrame L_Toes_offset: socket_parent=/bodyset/L_Toes translation=(0 0 0)
    CustomJoint hip_r: socket_parent_frame=Pelvis_offset socket_child_frame=R_Thigh_offset
      Coordinate hip_r_flexion: default_value=0.2513274 range=(-1.5708 1.5708) clamped=true
      Coordinate hip_r_rotation: default_value=0 range=(-1.5708 1.5708) clamped=true
      Coordinate hip_r_adduction: default_value=-4.659033e-13 range=(-1.5708 1.5708) clamped=true
      PhysicalOffsetFrame Pelvis_offset: socket_parent=/bodyset/Pelvis translation=(5.6996e-18 5.6996e-18 0.12321)
      PhysicalOffsetFrame R_Thigh_offset: socket_parent=/bodyset/R_Thigh translation=(0 0 0)
      SpatialTransform:
        TransformAxis rotation1: coordinates=hip_r_flexion axis=(0 0 1) LinearFunction(coefficients=1 0)
        TransformAxis rotation2: coordinates=hip_r_rotation axis=(0 1 0) LinearFunction(coefficients=1 0)
        TransformAxis rotation3: coordinates=hip_r_adduction axis=(1 0 0) LinearFunction(coefficients=1 0)
        TransformAxis translation1: axis=(1 0 0)
        TransformAxis translation2: axis=(0 1 0)
        TransformAxis translation3: axis=(0 0 1)
    PinJoint knee_r: socket_parent_frame=R_Thigh_offset socket_child_frame=R_Shank_offset
      Coordinate r_knee_flexion: default_value=1.239098e-29 range=(-2 0)
      PhysicalOffsetFrame R_Thigh_offset: socket_parent=/bodyset/R_Thigh translation=(-1.7906e-17 -0.38709 -1.7906e-17)
          orientation=(0.022735 1e-8 -1e-8)
      PhysicalOffsetFrame R_Shank_offset: socket_parent=/bodyset/R_Shank translation=(0 0 0)
    PinJoint ankle_r: socket_parent_frame=R_Shank_offset socket_child_frame=R_Foot_offset
      Coordinate r_ankle_flexion: default_value=1.317166e-29 range=(-1 1)
      PhysicalOffsetFrame R_Shank_offset: socket_parent=/bodyset/R_Shank translation=(0.0010149 -0.40478 0.013463)
          orientation=(-0.31618 0.070937 -0.18932)
      PhysicalOffsetFrame R_Foot_offset: socket_parent=/bodyset/R_Foot translation=(0 0 0)
    PinJoint mtp_r: socket_parent_frame=R_Foot_offset socket_child_frame=R_Toes_offset
      Coordinate r_mtp_flexion: default_value=1.30799e-26 range=(-1 1)
      PhysicalOffsetFrame R_Foot_offset: socket_parent=/bodyset/R_Foot translation=(0.1496 1.7521e-9 -0.038032)
          orientation=(1.0339 0.18023 -0.21361)
      PhysicalOffsetFrame R_Toes_offset: socket_parent=/bodyset/R_Toes translation=(0 0 0)
    PinJoint hallux_r: socket_parent_frame=R_Foot_offset socket_child_frame=R_Hallux_offset
      Coordinate r_hallux_flexion: default_value=1.30799e-26 range=(-1 1)
      PhysicalOffsetFrame R_Foot_offset: socket_parent=/bodyset/R_Foot translation=(0.10604 0.0020115 -0.093685)
          orientation=(-0.66566 0.77438 0.43939)
      PhysicalOffsetFrame R_Hallux_offset: socket_parent=/bodyset/R_Hallux translation=(0 0 0)
  ConstraintSet:
    CoordinateCouplerConstraint: independent_coordinate_names=r_mtp_flexion dependent_coordinate_name=r_hallux_flexion
        coupled_coordinates_function=LinearFunction(coefficients=1 0)
  ForceSet:
    Millard2012EquilibriumMuscle [values shared by the 36 below unless stated]: max_isometric_force=1
        optimal_fiber_length=1 tendon_slack_length=1 pennation_angle_at_optimal=0 [radians] default_fiber_length=1
        minimum_activation=0.01
      ActiveForceLengthCurve: min_norm_active_fiber_length=0.4441 transition_norm_fiber_length=0.73
          max_norm_active_fiber_length=1.8123 shallow_ascending_slope=0.8616 minimum_value=0
      ForceVelocityCurve: concentric_slope_at_vmax=0 concentric_slope_near_vmax=0.25 isometric_slope=5
          eccentric_slope_at_vmax=0 eccentric_slope_near_vmax=0.15 max_eccentric_velocity_force_multiplier=1.4
          concentric_curviness=0.6 eccentric_curviness=0.9
      FiberForceLengthCurve: strain_at_zero_force=0 strain_at_one_norm_force=0.6
      TendonForceLengthCurve: strain_at_one_norm_force=0.049
    Millard2012EquilibriumMuscle R_AM:
      PathPoint Muscle-origin: Pelvis (0.08388488 -0.05631063 0.01229102)
      PathPoint Muscle-insertion: Pelvis (0.08258758 -0.1096074 0.05555759)
      PathPoint P3: R_Thigh (-0.005061407 -0.2470459 0.02527065)
    Millard2012EquilibriumMuscle R_AB:
      PathPoint Muscle-origin: Pelvis (0.09280988 -0.01543204 0.01778733)
      PathPoint Muscle-insertion: R_Thigh (-0.01198 -0.1040746 0.03774187)
    Millard2012EquilibriumMuscle R_AL:
      PathPoint Muscle-origin: Pelvis (0.08998111 -0.03299708 0.01495927)
      PathPoint P2: Pelvis (0.06766352 -0.1007099 0.09429679)
      PathPoint Muscle-insertion: R_Thigh (-0.009755988 -0.1766103 0.03795055)
      PathWrap: wrap_object=rIschium_Cylinder method=hybrid
    Millard2012EquilibriumMuscle R_BFS:
      PathPoint Muscle-origin: R_Thigh (-0.00353349 -0.2637986 0.02671989)
      PathPoint Muscle-insertion: R_Shank (-0.02764277 -0.08942137 0.04231827)
    Millard2012EquilibriumMuscle R_BFL:
      PathPoint Muscle-origin: Pelvis (-0.01290525 -0.1168661 0.1078698)
      PathPoint Muscle-insertion: R_Shank (-0.02570119 -0.09115587 0.04241156)
    Millard2012EquilibriumMuscle R_EDL_TENDONII:
      PathPoint Muscle-origin: R_Shank (0.02418852 -0.07206797 0.04151825)
      PathPoint P2: R_Shank (0.02951514 -0.3835431 0.007255575)
      PathPoint P3: R_Foot (0.1376183 0.01035127 -0.02569828)
      PathPoint Muscle-insertion: R_Toes (0.07743741 0.007899231 0.01207967)
      PathWrap: wrap_object=rPosteriorMetarsalHead_Cylinder method=hybrid range=(3 4)
    Millard2012EquilibriumMuscle R_EDL_TENDONIII:
      PathPoint Muscle-origin: R_Shank (0.02418852 -0.07206797 0.04151825)
      PathPoint R_EDL_TENDONII-P2: R_Shank (0.02951514 -0.3835431 0.007255575)
      PathPoint P3: R_Foot (0.1406942 -0.003642268 -0.01022437)
      PathPoint Muscle-insertion: R_Toes (0.07908247 0.01118293 0.03368125)
      PathWrap: wrap_object=rPosteriorMetarsalHead_Cylinder method=hybrid range=(3 -1)
    Millard2012EquilibriumMuscle R_EDL_TENDONIV:
      PathPoint Muscle-origin: R_Shank (0.02418852 -0.07206797 0.04151825)
      PathPoint R_EDL_TENDONII-P2: R_Shank (0.02951514 -0.3835431 0.007255575)
      PathPoint P3: R_Foot (0.1373885 -0.02206058 -0.0007783118)
      PathPoint Muscle-insertion: R_Toes (0.06244639 0.005902563 0.05133933)
      PathWrap: wrap_object=rPosteriorMetarsalHead_Cylinder method=hybrid range=(3 -1)
    Millard2012EquilibriumMuscle R_EDL_TENDONV:
      PathPoint Muscle-origin: R_Shank (0.02418852 -0.07206797 0.04151825)
      PathPoint R_EDL_TENDONII-P2: R_Shank (0.02951514 -0.3835431 0.007255575)
      PathPoint P3: R_Foot (0.1326824 -0.03378876 0.008850392)
      PathPoint Muscle-insertion: R_Toes (0.03181924 0.007193701 0.06425328)
      PathWrap: wrap_object=rPosteriorMetarsalHead_Cylinder method=hybrid range=(3 4)
    Millard2012EquilibriumMuscle R_EHL:
      PathPoint P1: R_Shank (-0.008967641 -0.2238577 0.03682762)
      PathPoint P2: R_Shank (0.02530357 -0.3831758 -0.006981664)
      PathPoint P4: R_Foot (0.1042164 0.01363599 -0.09889449)
      PathPoint P5: R_Hallux (0.05090578 0.007565161 0.010608)
    Millard2012EquilibriumMuscle R_FDL_TENDONII:
      PathPoint Muscle-origin: R_Shank (-0.007133718 -0.1945242 -0.01571269)
      PathPoint P2: R_Shank (-0.02098401 -0.3303368 -0.02329826)
      PathPoint P4: R_Foot (0.01964369 -0.0148814 -0.04372767)
      PathPoint P4_0: R_Foot (0.1430425 -0.006603469 -0.04409183)
      PathPoint Muscle-insertion: R_Toes (0.07605642 0.004142063 0.01118601)
      PathWrap pathwrap_0: wrap_object=R_Ankle_Cylinder method=hybrid range=(2 3)
    Millard2012EquilibriumMuscle R_FDL_TENDONIII:
      PathPoint Muscle-origin: R_Shank (-0.007133718 -0.1945242 -0.01571269)
      PathPoint R_FDL_TENDONII-P2: R_Shank (-0.02098401 -0.3303368 -0.02329826)
      PathPoint R_FDL_TENDONII-P4: R_Foot (0.01964369 -0.0148814 -0.04372767)
      PathPoint R_FDL_TENDONII-P4_0: R_Foot (0.1369345 -0.01575781 -0.0257995)
      PathPoint Muscle-insertion: R_Toes (0.0759715 0.003496801 0.03830147)
      PathWrap pathwrap_0: wrap_object=R_Ankle_Cylinder method=hybrid range=(-1 3)
    Millard2012EquilibriumMuscle R_FDL_TENDONIV:
      PathPoint Muscle-origin: R_Shank (-0.007133718 -0.1945242 -0.01571269)
      PathPoint R_FDL_TENDONII-P2: R_Shank (-0.02098401 -0.3303368 -0.02329826)
      PathPoint R_FDL_TENDONII-P4: R_Foot (0.01964369 -0.0148814 -0.04372767)
      PathPoint R_FDL_TENDONII-P4_0: R_Foot (0.1287379 -0.03498666 -0.01593375)
      PathPoint Muscle-insertion: R_Toes (0.06365221 0.002164729 0.05270974)
      PathWrap pathwrap_0: wrap_object=R_Ankle_Cylinder method=hybrid range=(1 3)
    Millard2012EquilibriumMuscle R_FDL_TENDONV:
      PathPoint Muscle-origin: R_Shank (-0.007133718 -0.1945242 -0.01571269)
      PathPoint R_FDL_TENDONII-P2: R_Shank (-0.02098401 -0.3303368 -0.02329826)
      PathPoint R_FDL_TENDONII-P4: R_Foot (0.01964369 -0.0148814 -0.04372767)
      PathPoint R_FDL_TENDONII-P4_0: R_Foot (0.1296014 -0.04540423 -0.002038578)
      PathPoint Muscle-insertion: R_Toes (0.03282539 0.001359387 0.06644353)
      PathWrap: wrap_object=R_Ankle_Cylinder method=hybrid
    Millard2012EquilibriumMuscle R_FHL:
      PathPoint Muscle-origin: R_Shank (-0.01062889 -0.1875344 0.03866653)
      PathPoint P2: R_Shank (-0.02652432 -0.3621316 0.006694011)
      PathPoint Muscle-insertion: R_Foot (0.02788525 -0.01593278 -0.05496996)
      PathPoint P4: R_Foot (0.09697863 -0.008990818 -0.09322628)
      PathPoint P4_0: R_Hallux (0.05991894 -0.00552202 0.0111702)
      PathWrap: wrap_object=R_Ankle_Cylinder method=hybrid
    Millard2012EquilibriumMuscle R_GMax:
      PathPoint Muscle-origin: Pelvis (-0.1385726 0.1813556 0.06929494)
      PathPoint R_GMax_central-P2: Pelvis (-0.1000319 0.01429816 0.1394723)
      PathPoint Muscle-insertion: R_Thigh (-0.01663581 -0.1213439 0.05028803)
      PathWrap: wrap_object=rFemoralNeck method=hybrid range=(2 3)
    Millard2012EquilibriumMuscle R_GMed:
      PathPoint Muscle-origin: Pelvis (-0.126233 0.2546173 0.1783441)
      PathPoint P2: Pelvis (-0.1020773 0.1262673 0.1991575)
      PathPoint Muscle-insertion: R_Thigh (-0.01511961 0.02552271 0.06046002)
    Millard2012EquilibriumMuscle R_GMin:
      PathPoint Muscle-origin: Pelvis (-0.08522876 0.1476282 0.1363883)
      PathPoint Muscle-insertion: R_Thigh (-0.01106849 0.02854968 0.05621558)
    Millard2012EquilibriumMuscle R_GRA:
      PathPoint Muscle-origin: Pelvis (0.09354934 -0.04385695 0.01169978)
      PathPoint P2: Pelvis (0.09137622 -0.1317576 0.03780178)
      PathPoint Muscle-insertion: R_Shank (0.009199603 -0.0547497 -0.03754711)
    Millard2012EquilibriumMuscle R_ILI:
      PathPoint Muscle-origin: Pelvis (-0.09565966 0.2141018 0.1700126)
      PathPoint P2: Pelvis (0.01759891 0.01859238 0.1452142)
      PathPoint Muscle-insertion: R_Thigh (-0.01123323 -0.09263274 0.03725147)
      PathWrap: wrap_object=rFemoralNeck_Cylinder_Y method=hybrid range=(2 3)
    Millard2012EquilibriumMuscle R_LG:
      PathPoint Muscle-origin: R_Thigh (-0.01296484 -0.3545119 0.03029635)
      PathPoint P2: R_Shank (-0.07078066 -0.08225865 0.0442834)
      PathPoint Muscle-insertion: R_Foot (-0.05134091 -0.04083472 -0.004731882)
      PathWrap: wrap_object=rProxTibiaCylinder method=hybrid
    Millard2012EquilibriumMuscle R_MG:
      PathPoint Muscle-origin: R_Thigh (-0.002947207 -0.3489346 -0.004547176)
      PathPoint P2: R_Shank (-0.06873139 -0.08865699 -0.01432639)
      PathPoint Muscle-insertion: R_Foot (-0.05144765 -0.04125136 -0.00255732)
      PathWrap: wrap_object=rProxTibiaCylinder method=hybrid range=(1 2)
    Millard2012EquilibriumMuscle R_PB:
      PathPoint Muscle-origin: R_Shank (-0.0111152 -0.2863423 0.04353747)
      PathPoint Muscle-insertion: R_Foot (-0.02286973 -0.02373687 0.02171381)
      PathPoint P3: R_Foot (0.04879411 -0.04864642 0.02262741)
    Millard2012EquilibriumMuscle R_PIRI:
      PathPoint Muscle-origin: Pelvis (-0.09422534 0.04735008 0.04918203)
      PathPoint Muscle-insertion: R_Thigh (-0.01836858 0.02557425 0.05472232)
    Millard2012EquilibriumMuscle R_PL:
      PathPoint P1: R_Shank (-0.02068381 -0.09354437 0.05155346)
      PathPoint Muscle-origin: R_Shank (-0.02336335 -0.4162501 0.04102326)
      PathPoint Muscle-insertion: R_Foot (0.05284339 -0.04831777 0.01676889)
    Millard2012EquilibriumMuscle R_RF:
      PathPoint Muscle-origin: Pelvis (-0.01600366 0.1273503 0.1987738)
      PathPoint P2: Pelvis (0.03960496 -0.006598908 0.1624035)
      PathPoint P3: R_Thigh (0.04815318 -0.3833542 0.02037767)
      PathPoint Muscle-insertion: R_Shank (0.0451948 -0.08213343 0.01293647)
      PathWrap: wrap_object=rFemoralCondyles_Cylinder2 method=hybrid range=(3 4)
    Millard2012EquilibriumMuscle R_SAR:
      PathPoint Muscle-origin: Pelvis (-0.002043783 0.1718385 0.2370192)
      PathPoint P2: R_Thigh (0.04594987 -0.001464322 0.03568644)
      PathPoint P4: R_Thigh (0.03319607 -0.2996614 -0.0446463)
      PathPoint P4_0: R_Shank (0.02176887 -0.0153924 -0.04282889)
      PathPoint Muscle-insertion: R_Shank (0.03457877 -0.08078572 -0.007642247)
      PathWrap: wrap_object=rFemoralMedialCondyle_Sphere method=hybrid
    Millard2012EquilibriumMuscle R_SM:
      PathPoint Muscle-origin: Pelvis (-0.01167096 -0.1139643 0.1155802)
      PathPoint P3: R_Thigh (-0.04402836 -0.3479215 -0.01474046)
      PathPoint Muscle-insertion: R_Shank (-0.02271194 -0.05887232 -0.03790866)
      PathWrap: wrap_object=rFemoralCondyles_Cylinder2_0 method=hybrid
    Millard2012EquilibriumMuscle R_SOL:
      PathPoint Muscle-origin: R_Shank (-0.02351384 -0.08754505 0.03287756)
      PathPoint Muscle-insertion: R_Foot (-0.05033887 -0.0408243 -0.004173199)
    Millard2012EquilibriumMuscle R_ST:
      PathPoint Muscle-origin: Pelvis (-0.005593474 -0.1235558 0.0965949)
      PathPoint P3: R_Thigh (-0.0449628 -0.300327 -0.02824495)
      PathPoint P4: R_Shank (-0.01566607 -0.05489786 -0.03928127)
      PathPoint Muscle-insertion: R_Shank (0.01252778 -0.08544216 -0.02452452)
      PathWrap: wrap_object=rFemoralCondyles_Cylinder2_0 method=hybrid
    Millard2012EquilibriumMuscle R_TA:
      PathPoint Muscle-origin: R_Shank (0.03216013 -0.07668739 0.0316277)
      PathPoint P2: R_Shank (0.01861148 -0.2306397 0.003463396)
      PathPoint Muscle-insertion: R_Shank (0.01914209 -0.3745395 -0.01368163)
      PathPoint P4: R_Foot (0.05122286 -0.001296098 -0.05042471)
    Millard2012EquilibriumMuscle R_TP:
      PathPoint Muscle-origin: R_Shank (-0.01078371 -0.0997109 0.0108538)
      PathPoint P2: R_Shank (-0.01331916 -0.3140182 -0.007982976)
      PathPoint P4: R_Shank (-0.03489443 -0.4099689 -0.02477822)
      PathPoint P3: R_Foot (0.02452713 -0.007994379 -0.05127212)
    Millard2012EquilibriumMuscle R_PECT:
      PathPoint Muscle-origin: Pelvis (0.08150857 -0.01185788 0.03277705)
      PathPoint P2: Pelvis (0.04312485 -0.1025305 0.1212789)
      PathPoint Muscle-insertion: R_Thigh (-0.009125393 -0.1262127 0.03732927)
    Millard2012EquilibriumMuscle R_VI:
      PathPoint Muscle-origin: R_Thigh (0.008955846 -0.08109472 0.061216)
      PathPoint P2: R_Thigh (0.03258567 -0.2582876 0.04306545)
      PathPoint P3: R_Thigh (0.0420881 -0.3812678 0.01377248)
      PathPoint Muscle-insertion: R_Shank (0.04089826 -0.08277116 0.01173629)
      PathWrap: wrap_object=rFemoralCondyles_Cylinder2 method=hybrid range=(3 4)
    Millard2012EquilibriumMuscle R_VL:
      PathPoint Muscle-origin: R_Thigh (0.0158691 -0.0191714 0.06553447)
      PathPoint P2: R_Thigh (0.01071907 -0.2429249 0.08690231)
      PathPoint P3: R_Thigh (0.04370744 -0.3835795 0.02782819)
      PathPoint Muscle-insertion: R_Shank (0.03725625 -0.08398217 0.01084653)
      PathWrap: wrap_object=rFemoralCondyles_Cylinder2 method=hybrid range=(3 4)
    Millard2012EquilibriumMuscle R_VMed:
      PathPoint Muscle-origin: R_Thigh (0.01014132 -0.04969425 0.03957087)
      PathPoint P2: R_Thigh (0.05966255 -0.187526 0.006001468)
      PathPoint P3: R_Thigh (0.04770115 -0.3841637 0.005545797)
      PathPoint Muscle-insertion: R_Shank (0.04214499 -0.08140421 0.01247431)
      PathWrap: wrap_object=rFemoralCondyles_Cylinder2 method=hybrid range=(3 4)
