# OpenSim document version 40600
Model Macaque:
  gravity: 0 0 -9.8066
  Ground
  BodySet:
    Body Pelvis: mass=0.37876 [kg] mass_center=(-0.0093307 0.026653 -0.0010919)
        inertia=(0.00061732 0.00021981 0.00052632 6.0797e-5 -4.8058e-6 1.224e-5) meshes=(Pelvis.obj BodyMass.obj)
      WrapCylinder rIschium_Cylinder: xyz_body_rotation=(-2.802415 0.5350252 -2.699047)
          translation=(0.003928523 -0.03435199 0.01214616) quadrant=-x radius=0.01 length=0.05
      WrapEllipsoid rPelvis_ellipsoid: xyz_body_rotation=(-1.5 0.9 -0.5)
          translation=(0.004807592 -0.02923101 0.01512791) quadrant=z dimensions=(0.016 0.029 0.014)
    Body thigh_l: mass=0.10233 mass_center=(-1.4329e-5 -0.078171 -0.0039543)
        inertia=(0.00022582 1.1166e-5 0.00022484 6.5822e-6 -2.5213e-7 9.9635e-6) meshes=(lFemurbone.obj lThigh.obj)
    Body shank_l: mass=0.067935 mass_center=(0.00046534 -0.078209 -0.00098061)
        inertia=(0.00012282 5.2109e-6 0.00012231 -1.0572e-6 -5.2676e-8 5.5339e-7) meshes=(lShankbone.obj lShank.obj)
    Body foot_l: mass=0.028383 mass_center=(0.026103 -0.0052329 0.0022223)
        inertia=(1.9264e-6 1.4214e-5 1.3876e-5 1.5958e-7 -6.274e-7 -3.3453e-7)
        meshes=(lFootbone2.obj lFootbone.obj lFoot.obj)
    Body toes_l: mass=0.0094512 mass_center=(0.01874 -0.0068367 -0.010933)
        inertia=(6.4181e-7 1.5974e-6 1.2538e-6 1.5555e-7 -1.4438e-7 -1.2494e-7) meshes=(lDigitsbone.obj lDigits.obj)
    Body thigh_r: mass=0.10233 mass_center=(-1.4329e-5 -0.078171 0.0039554)
        inertia=(0.00022582 1.1166e-5 0.00022484 6.5822e-6 2.5213e-7 -9.9635e-6) meshes=(rThighbone.obj rThigh.obj)
      WrapSphere rFemoralMedialCondyle_Sphere: xyz_body_rotation=(-1.2 0.9 -1.9)
          translation=(-0.03042724 -0.1613235 -0.01511641) quadrant=all radius=0.026
      WrapCylinder rFemoralneck: xyz_body_rotation=(-3.052285 -0.1327933 -1.499041)
          translation=(0.0002296857 -0.001895779 0.0007148876) quadrant=y radius=0.011 length=0.03
      WrapCylinder rFemoralCondyles_Cylinder: xyz_body_rotation=(-3.052285 -0.1327933 -1.499041)
          translation=(-0.002883944 -0.1512238 0.002205651) quadrant=-y radius=0.01 length=0.028
      WrapCylinder rFemoralCondyles_Cylinder2: xyz_body_rotation=(-3.12217 -0.1724784 -1.111685)
          translation=(0.005981548 -0.1640617 -0.0006240396) quadrant=y radius=0.0105 length=0.028
    Body shank_r: mass=0.067935 mass_center=(0.00046534 -0.078209 0.00098171)
        inertia=(0.00012282 5.2109e-6 0.00012231 -1.0572e-6 5.2676e-8 -5.534e-7) meshes=(rShankbone.obj rShank.obj)
      WrapEllipsoid rDistalTibia_ellipsoid: xyz_body_rotation=(-0.6 0.8 -1.9) translation=(-0.01 -0.2780001 -0.022)
          quadrant=-z dimensions=(0.028 0.02 0.012)
      WrapCylinder rProxTibiaCylinder: active=false xyz_body_rotation=(-3.139164 -0.1450858 -3.096977)
          translation=(-0.004559113 -0.003972433 0.0003349708) quadrant=x radius=0.008 length=0.032
    Body foot_r: mass=0.0026046 mass_center=(0.044613 -0.0077322 -0.02744)
        inertia=(2.5348e-7 4.9853e-7 2.9298e-7 5.5783e-8 2.3782e-7 -5.0569e-8)
        meshes=(rFootbones2.obj rFootbones.obj rFootmass.obj rFootbones3.obj)
      WrapSphere rDistalAnkle_Sphere: xyz_body_rotation=(-1.2 1.2 -1.9) translation=(0.001 0.015 -0.01) quadrant=all
          radius=0.015
      WrapSphere rDistalAnkle_SphereforFDL: active=false xyz_body_rotation=(-1.2 1.2 -1.9)
          translation=(-0.011 -0.008000003 -0.011) quadrant=all radius=0.017
      WrapCylinder R_Ankle_Cylinder: xyz_body_rotation=(0.09638351 -0.1119334 -0.6575189)
          translation=(-0.002900016 0.001313881 -0.004977753) quadrant=-y radius=0.006 length=0.015
      WrapCylinder rAnteriorMetarsalHead_Cylinder: xyz_body_rotation=(-2.9 0.31 0.22) translation=(0.11 -0.008 0.02)
          quadrant=y radius=0.01 length=0.04
      WrapCylinder rPosteriorHalluxHead_Cylinder: xyz_body_rotation=(3.4 0.24 -1.9) translation=(0.077 -0.021 0.0025)
          quadrant=-x radius=0.0055 length=0.011
      WrapCylinder rAnteriorHalluxHead_Cylinder: xyz_body_rotation=(3.4 0.24 -1.9) translation=(0.077 -0.015 0.0025)
          quadrant=x radius=0.0055 length=0.011
    Body toes_r: mass=0.0094512 mass_center=(0.01874 -0.0068366 0.010934)
        inertia=(6.4181e-7 1.5974e-6 1.2538e-6 1.5555e-7 1.4438e-7 1.2494e-7) meshes=(rDigitsbone.obj rDigitsmass.obj)
    Body R_Hallux: mass=0.0026039 mass_center=(-0.0061038 -0.00061467 -0.00081608)
        inertia=(2.5168e-8 5.0732e-7 5.1128e-7 -3.4048e-8 -9.4154e-9 -9.4902e-10)
        meshes=(halluxr_bone.obj rFootmass.obj)
  JointSet:
    CustomJoint Pelvis: socket_parent_frame=ground_offset socket_child_frame=Pelvis_offset
      Coordinate Pelvis_Rz: default_value=0 range=(-3.1416 3.1416) clamped=true
      Coordinate Pelvis_Ry: default_value=0 range=(-3.1416 3.1416) clamped=true
      Coordinate Pelvis_Rx: default_value=0 range=(-3.1416 3.1416) clamped=true
      Coordinate Pelvis_Tx: default_value=0 range=(-0.1 0.1) clamped=true
      Coordinate Pelvis_Ty: default_value=0 range=(-0.1 0.1) clamped=true
      Coordinate Pelvis_Tz: default_value=0 range=(-0.1 0.1) clamped=true
      PhysicalOffsetFrame ground_offset: socket_parent=/ground translation=(0 0 0) [meters]
      PhysicalOffsetFrame Pelvis_offset: socket_parent=/bodyset/Pelvis translation=(0 0 0)
      SpatialTransform:
        TransformAxis rotation1: coordinates=Pelvis_Rz axis=(0 0 1) LinearFunction(coefficients=1 0)
        TransformAxis rotation2: coordinates=Pelvis_Ry axis=(0 1 0) LinearFunction(coefficients=1 0)
        TransformAxis rotation3: coordinates=Pelvis_Rx axis=(1 0 0) LinearFunction(coefficients=1 0)
        TransformAxis translation1: coordinates=Pelvis_Tx axis=(1 0 0) LinearFunction(coefficients=1 0)
        TransformAxis translation2: coordinates=Pelvis_Ty axis=(0 1 0) LinearFunction(coefficients=1 0)
        TransformAxis translation3: coordinates=Pelvis_Tz axis=(0 0 1) LinearFunction(coefficients=1 0)
    CustomJoint hip_l: socket_parent_frame=Pelvis_offset socket_child_frame=thigh_l_offset
      Coordinate hip_flexion_l: default_value=0 range=(-1.5708 1.5708) clamped=true
      Coordinate hip_rotation_l: default_value=0 range=(-1.5708 1.5708) clamped=true
      Coordinate hip_adduction_l: default_value=0 range=(-1.5708 1.5708) clamped=true
      PhysicalOffsetFrame Pelvis_offset: socket_parent=/bodyset/Pelvis translation=(-1.6284e-18 -1.6284e-18 -0.035201)
      PhysicalOffsetFrame thigh_l_offset: socket_parent=/bodyset/thigh_l translation=(0 0 0)
      SpatialTransform:
        TransformAxis rotation1: coordinates=hip_flexion_l axis=(0 0 1) LinearFunction(coefficients=1 0)
        TransformAxis rotation2: coordinates=hip_rotation_l axis=(0 1 0) LinearFunction(coefficients=1 0)
        TransformAxis rotation3: coordinates=hip_adduction_l axis=(1 0 0) LinearFunction(coefficients=1 0)
        TransformAxis translation1: axis=(1 0 0)
        TransformAxis translation2: axis=(0 1 0)
        TransformAxis translation3: axis=(0 0 1)
    PinJoint knee_l: socket_parent_frame=thigh_l_offset socket_child_frame=shank_l_offset
      Coordinate l_knee_flexion: default_value=0 range=(-1.6 0)
      PhysicalOffsetFrame thigh_l_offset: socket_parent=/bodyset/thigh_l translation=(6.9559e-18 -0.15037 6.9559e-18)
          orientation=(-0.067716 0 -0.00047414) [radians]
      PhysicalOffsetFrame shank_l_offset: socket_parent=/bodyset/shank_l translation=(0 0 0)
    PinJoint ankle_l: socket_parent_frame=shank_l_offset socket_child_frame=foot_l_offset
      Coordinate l_ankle_flexion: default_value=0 range=(-0.8 0.8)
      PhysicalOffsetFrame shank_l_offset: socket_parent=/bodyset/shank_l translation=(-0.00057846 -0.16454 -0.00089042)
          orientation=(0.067783 -0.013663 0.0009275)
      PhysicalOffsetFrame foot_l_offset: socket_parent=/bodyset/foot_l translation=(0 0 0)
    PinJoint mtp_l: socket_parent_frame=foot_l_offset socket_child_frame=toes_l_offset
      Coordinate l_mtp_flexion: default_value=0 range=(-0.8 0.8)
      PhysicalOffsetFrame foot_l_offset: socket_parent=/bodyset/foot_l translation=(0.064065 -4.118e-9 0.014352)
          orientation=(-0.15844 -0.35213 -0.034811)
      PhysicalOffsetFrame toes_l_offset: socket_parent=/bodyset/toes_l translation=(0 0 0)
    CustomJoint hip_r: socket_parent_frame=Pelvis_offset socket_child_frame=thigh_r_offset
      Coordinate hip_flexion_r: default_value=0.3735005 range=(-1.5708 1.5708) clamped=true
      Coordinate hip_rotation_r: default_value=4.856047e-15 range=(-1.5708 1.5708) clamped=true
      Coordinate hip_adduction_r: default_value=5.350352e-16 range=(-1.5708 1.5708) clamped=true
      PhysicalOffsetFrame Pelvis_offset: socket_parent=/bodyset/Pelvis translation=(1.6283e-18 1.6283e-18 0.0352)
      PhysicalOffsetFrame thigh_r_offset: socket_parent=/bodyset/thigh_r translation=(0 0 0)
      SpatialTransform:
        TransformAxis rotation1: coordinates=hip_flexion_r axis=(0 0 1) LinearFunction(coefficients=1 0)
        TransformAxis rotation2: coordinates=hip_rotation_r axis=(0 1 0) LinearFunction(coefficients=1 0)
        TransformAxis rotation3: coordinates=hip_adduction_r axis=(1 0 0) LinearFunction(coefficients=1 0)
        TransformAxis translation1: axis=(1 0 0)
        TransformAxis translation2: axis=(0 1 0)
        TransformAxis translation3: axis=(0 0 1)
    PinJoint knee_r: socket_parent_frame=thigh_r_offset socket_child_frame=shank_r_offset
      Coordinate r_knee_flexion: default_value=1.691213e-34 range=(-1.6 0)
      PhysicalOffsetFrame thigh_r_offset: socket_parent=/bodyset/thigh_r translation=(-6.9559e-18 -0.15037 -6.9559e-18)
          orientation=(0.067716 0 -0.00047414)
      PhysicalOffsetFrame shank_r_offset: socket_parent=/bodyset/shank_r translation=(0 0 0)
    PinJoint ankle_r: socket_parent_frame=shank_r_offset socket_child_frame=foot_r_offset
      Coordinate r_ankle_flexion: default_value=3.291196e-34 range=(-0.8 0.8)
      PhysicalOffsetFrame shank_r_offset: socket_parent=/bodyset/shank_r translation=(-0.00057846 -0.16454 0.00089041)
          orientation=(-0.067783 0.013663 0.0009275)
      PhysicalOffsetFrame foot_r_offset: socket_parent=/bodyset/foot_r translation=(0 0 0)
    PinJoint mtp_r: socket_parent_frame=foot_r_offset socket_child_frame=toes_r_offset
      Coordinate r_mtp_flexion: default_value=7.353953e-32 range=(-0.8 0.8)
      PhysicalOffsetFrame foot_r_offset: socket_parent=/bodyset/foot_r translation=(0.064065 -4.0346e-9 -0.014352)
          orientation=(0.15844 0.35213 -0.034811)
      PhysicalOffsetFrame toes_r_offset: socket_parent=/bodyset/toes_r translation=(0 0 0)
    PinJoint hallux_r: socket_parent_frame=foot_r_offset socket_child_frame=R_Hallux_offset
      Coordinate r_hallux_flexion: default_value=7.353953e-32 range=(-0.8 0.8)
      PhysicalOffsetFrame foot_r_offset: socket_parent=/bodyset/foot_r translation=(0.049501 -0.0082126 -0.031211)
          orientation=(-0.65248 0.73116 0.21557)
      PhysicalOffsetFrame R_Hallux_offset: socket_parent=/bodyset/R_Hallux translation=(0 0 0)
  ConstraintSet:
    CoordinateCouplerConstraint: independent_coordinate_names=r_mtp_flexion dependent_coordinate_name=r_hallux_flexion
        coupled_coordinates_function=LinearFunction(coefficients=1 0)
  ForceSet:
    Millard2012EquilibriumMuscle [values shared by the 36 below unless stated]: max_isometric_force=1
        optimal_fiber_length=1 tendon_slack_length=1 pennation_angle_at_optimal=0 [radians] default_fiber_length=1
        minimum_activation=0.01
      ActiveForceLengthCurve: min_norm_active_fiber_length=0.4441 transition_norm_fiber_length=0.73
          max_norm_active_fiber_length=1.8123 shallow_ascending_slope=0.8616 minimum_value=0
      ForceVelocityCurve: concentric_slope_at_vmax=0 concentric_slope_near_vmax=0.25 isometric_slope=5
          eccentric_slope_at_vmax=0 eccentric_slope_near_vmax=0.15 max_eccentric_velocity_force_multiplier=1.4
          concentric_curviness=0.6 eccentric_curviness=0.9
      FiberForceLengthCurve: strain_at_zero_force=0 strain_at_one_norm_force=0.6
      TendonForceLengthCurve: strain_at_one_norm_force=0.049
    Millard2012EquilibriumMuscle R_AM:
      PathPoint Muscle-origin: Pelvis (0.01786968 -0.02609807 0.004415927)
      PathPoint Muscle-insertion: thigh_r (0.00101663 -0.1081223 0.006648621)
    Millard2012EquilibriumMuscle R_AB:
      PathPoint Muscle-origin: Pelvis (0.02563184 -0.005317407 0.005956579)
      PathPoint Muscle-insertion: thigh_r (-0.0002667013 -0.06079921 0.006581924)
    Millard2012EquilibriumMuscle R_AL:
      PathPoint Muscle-origin: Pelvis (0.02291296 -0.01488124 0.005197803)
      PathPoint Muscle-insertion: thigh_r (0.0005515072 -0.08349002 0.002322539)
      PathWrap: wrap_object=rIschium_Cylinder method=hybrid
    Millard2012EquilibriumMuscle R_BFS:
      PathPoint Muscle-origin: thigh_r (0.0001698054 -0.1066375 0.007680667)
      PathPoint Muscle-insertion: shank_r (-0.012572 -0.0222566 0.009483895)
    Millard2012EquilibriumMuscle R_BFL:
      PathPoint Muscle-origin: Pelvis (-0.01855337 -0.03088965 0.03423915)
      PathPoint Muscle-insertion: shank_r (-0.009513527 -0.0259353 0.0115563)
    Millard2012EquilibriumMuscle R_EDL_TENDONII:
      PathPoint Muscle-origin: shank_r (0.001808706 -0.01898284 0.01018844)
      PathPoint P2: shank_r (0.006630852 -0.1638283 0.006479819)
      PathPoint P3: foot_r (0.06461682 0.004257794 -0.01330294)
      PathPoint Muscle-insertion: toes_r (0.03528828 -0.00728125 -0.002703115)
    Millard2012EquilibriumMuscle R_EDL_TENDONIII:
      PathPoint Muscle-origin: shank_r (0.001808706 -0.01898284 0.01018844)
      PathPoint R_EDL_TENDONII-P2: shank_r (0.006630852 -0.1638283 0.006479819)
      PathPoint R_EDL_TENDONII-P3: foot_r (0.06786329 0.001786964 -0.005491584)
      PathPoint Muscle-insertion: toes_r (0.03039576 -0.00477681 0.01261576)
    Millard2012EquilibriumMuscle R_EDL_TENDONIV:
      PathPoint Muscle-origin: shank_r (0.001808706 -0.01898284 0.01018844)
      PathPoint R_EDL_TENDONII-P2: shank_r (0.006630852 -0.1638283 0.006479819)
      PathPoint R_EDL_TENDONII-P3: foot_r (0.06529234 -0.003243402 0.001494737)
      PathPoint Muscle-insertion: toes_r (0.03929173 -0.01047536 0.01639715)
    Millard2012EquilibriumMuscle R_EDL_TENDONV:
      PathPoint Muscle-origin: shank_r (0.001808706 -0.01898284 0.01018844)
      PathPoint R_EDL_TENDONII-P2: shank_r (0.006630852 -0.1638283 0.006479819)
      PathPoint R_EDL_TENDONII-P3: foot_r (0.06188334 -0.00834642 0.005802439)
      PathPoint Muscle-insertion: toes_r (0.02776705 -0.01008816 0.02500331)
    Millard2012EquilibriumMuscle R_EHL:
      PathPoint P1: shank_r (-0.002890394 -0.1169719 0.007868042)
      PathPoint P2: shank_r (0.007120035 -0.1599685 0.002377617)
      PathPoint P4: foot_r (0.05023823 -0.006683665 -0.03594217)
      PathPoint P5: R_Hallux (0.02229855 0.001726173 -0.001011434)
    Millard2012EquilibriumMuscle R_FDL_TENDONII:
      PathPoint Muscle-origin: shank_r (0.001112296 -0.05665771 -0.003306921)
      PathPoint P2: shank_r (-0.008108623 -0.1557871 -0.007973689)
      PathPoint P4: foot_r (0.02062917 -0.008376605 -0.006717896)
      PathPoint P4_0: foot_r (0.06414156 -0.002323324 -0.01546693)
      PathPoint Muscle-insertion: toes_r (0.03434117 -0.009769042 -0.001705758)
      PathWrap pathwrap_0: wrap_object=R_Ankle_Cylinder method=hybrid range=(2 3)
    Millard2012EquilibriumMuscle R_FDL_TENDONIII:
      PathPoint Muscle-origin: shank_r (0.001112296 -0.05665771 -0.003306921)
      PathPoint R_FDL_TENDONII-P2: shank_r (-0.008108623 -0.1557871 -0.007973689)
      PathPoint R_FDL_TENDONII-P4: foot_r (0.02062917 -0.008376605 -0.006717896)
      PathPoint R_FDL_TENDONII-P4_0: foot_r (0.06663371 -0.006186888 -0.008276572)
      PathPoint Muscle-insertion: toes_r (0.02746997 -0.006768328 0.01172656)
      PathWrap pathwrap_0: wrap_object=R_Ankle_Cylinder method=hybrid range=(-1 3)
    Millard2012EquilibriumMuscle R_FDL_TENDONIV:
      PathPoint Muscle-origin: shank_r (0.001112296 -0.05665771 -0.003306921)
      PathPoint R_FDL_TENDONII-P2: shank_r (-0.008108623 -0.1557871 -0.007973689)
      PathPoint R_FDL_TENDONII-P4: foot_r (0.02062917 -0.008376605 -0.006717896)
      PathPoint R_FDL_TENDONII-P4_0: foot_r (0.05978109 -0.009535246 -0.001579066)
      PathPoint Muscle-insertion: toes_r (0.03894823 -0.01371645 0.01498453)
      PathWrap pathwrap_0: wrap_object=R_Ankle_Cylinder method=hybrid range=(1 3)
    Millard2012EquilibriumMuscle R_FDL_TENDONV:
      PathPoint Muscle-origin: shank_r (0.001112296 -0.05665771 -0.003306921)
      PathPoint R_FDL_TENDONII-P2: shank_r (-0.008108623 -0.1557871 -0.007973689)
      PathPoint R_FDL_TENDONII-P4: foot_r (0.02062917 -0.008376605 -0.006717896)
      PathPoint R_FDL_TENDONII-P4_0: foot_r (0.05763374 -0.01476781 0.003025775)
      PathPoint Muscle-insertion: toes_r (0.0301952 -0.01206083 0.02296646)
      PathWrap pathwrap_0: wrap_object=rDistalTibia_ellipsoid method=hybrid
    Millard2012EquilibriumMuscle R_FHL:
      PathPoint Muscle-origin: shank_r (-0.008969437 -0.06929311 0.01025912)
      PathPoint P2: shank_r (-0.00762354 -0.1398072 -0.0009991087)
      PathPoint Muscle-insertion: foot_r (0.01136643 -0.007997276 -0.013217)
      PathPoint P4: foot_r (0.04684727 -0.009973746 -0.03150663)
      PathPoint P4_0: R_Hallux (0.02250476 -0.0009325625 -0.0002865497)
      PathWrap: wrap_object=R_Ankle_Cylinder method=hybrid range=(2 3)
    Millard2012EquilibriumMuscle R_GMax:
      PathPoint Muscle-origin: Pelvis (-0.02552571 0.04236308 0.0127391)
      PathPoint R_GMax_central-P3: Pelvis (-0.0336054 0.01141847 0.02797805)
      PathPoint Muscle-insertion: thigh_r (-0.004798885 -0.03943634 0.008618073)
    Millard2012EquilibriumMuscle R_GMed:
      PathPoint Muscle-origin: Pelvis (-0.01413709 0.09352822 0.03518213)
      PathPoint P2: Pelvis (-0.01327481 0.05083472 0.04930404)
      PathPoint Muscle-insertion: thigh_r (-0.0009807254 0.00746746 0.02074265)
    Millard2012EquilibriumMuscle R_GMin:
      PathPoint Muscle-origin: Pelvis (-0.01554538 0.06613471 0.02525146)
      PathPoint P2: Pelvis (-0.02402534 0.03537069 0.04126382)
      PathPoint Muscle-insertion: thigh_r (-0.00394274 0.005022455 0.02081143)
    Millard2012EquilibriumMuscle R_GRA:
      PathPoint Muscle-origin: Pelvis (0.01525714 -0.03140781 0.002421091)
      PathPoint P2: thigh_r (0.006068186 -0.09774732 -0.01751614)
      PathPoint P3: thigh_r (0.0004476075 -0.1405986 -0.01759216)
      PathPoint Muscle-insertion: shank_r (0.009276732 -0.02361184 -0.003392744)
    Millard2012EquilibriumMuscle R_ILI:
      PathPoint Muscle-origin: Pelvis (-0.01155995 0.08751258 0.02843068)
      PathPoint P2: Pelvis (0.01093911 0.002871922 0.02994669)
      PathPoint Muscle-insertion: thigh_r (-0.004021892 -0.0337107 0.008024247)
      PathWrap: wrap_object=rFemoralneck method=hybrid range=(2 3)
    Millard2012EquilibriumMuscle R_LG:
      PathPoint Muscle-origin: thigh_r (-0.002247637 -0.143246 0.004796441)
      PathPoint P2: shank_r (-0.02063294 -0.01663554 0.008553793)
      PathPoint Muscle-insertion: foot_r (-0.01627639 0.0006646989 0.0006274596)
      PathWrap: wrap_object=rProxTibiaCylinder method=hybrid
    Millard2012EquilibriumMuscle R_MG:
      PathPoint Muscle-origin: thigh_r (6.655318e-5 -0.1410772 -0.005743763)
      PathPoint P2: shank_r (-0.01881079 -0.008261892 -0.004645406)
      PathPoint Muscle-insertion: foot_r (-0.01642503 0.0007875955 0.0006146937)
    Millard2012EquilibriumMuscle R_PB:
      PathPoint Muscle-origin: shank_r (-0.003692324 -0.1216851 0.01140107)
      PathPoint Muscle-insertion: foot_r (-0.008286011 -0.001754311 0.005693692)
      PathPoint P3: foot_r (0.02389316 -0.01236857 0.0111062)
    Millard2012EquilibriumMuscle R_PIRI:
      PathPoint Muscle-origin: Pelvis (-0.02760718 0.0423621 0.007714368)
      PathPoint Muscle-insertion: thigh_r (-0.005366228 0.009404352 0.01214894)
    Millard2012EquilibriumMuscle R_PL:
      PathPoint P1: shank_r (-0.01572075 -0.02791268 0.01350025)
      PathPoint Muscle-origin: shank_r (-0.008834518 -0.1657819 0.006974321)
      PathPoint Muscle-insertion: foot_r (0.02406087 -0.01239642 0.01174971)
    Millard2012EquilibriumMuscle R_RF:
      PathPoint Muscle-origin: Pelvis (-0.005586436 0.05847651 0.04081581)
      PathPoint P2: Pelvis (0.01729616 2.759672e-5 0.04690104)
      PathPoint P3: thigh_r (0.01588212 -0.1458893 0.003851839)
      PathPoint Muscle-insertion: shank_r (0.0157434 -0.02879996 0.003254473)
      PathWrap pathwrap_0: wrap_object=rFemoralCondyles_Cylinder2 method=hybrid range=(3 -1)
      PathWrap: wrap_object=rFemoralneck method=hybrid range=(1 2)
    Millard2012EquilibriumMuscle R_SAR:
      PathPoint Muscle-origin: Pelvis (-0.01056509 0.09734543 0.03463015)
      PathPoint P2: thigh_r (0.02336221 -0.03625713 0.003460227)
      PathPoint P4: thigh_r (0.005752628 -0.1297185 -0.01549508)
      PathPoint P4_0: shank_r (0.005984664 -0.002922801 -0.01448849)
      PathPoint Muscle-insertion: shank_r (0.01249825 -0.01923317 -0.00381676)
      PathWrap: wrap_object=rFemoralMedialCondyle_Sphere method=hybrid
    Millard2012EquilibriumMuscle R_SM:
      PathPoint Muscle-origin: Pelvis (-0.01749864 -0.03500244 0.03139241)
      PathPoint P3: thigh_r (-0.009592089 -0.1486335 -0.01563952)
      PathPoint Muscle-insertion: shank_r (0.005449938 -0.02932441 -0.003893879)
    Millard2012EquilibriumMuscle R_SOL:
      PathPoint Muscle-origin: shank_r (-0.01135622 -0.02585704 0.007947713)
      PathPoint Muscle-insertion: foot_r (-0.01532635 6.824293e-5 0.0004905812)
    Millard2012EquilibriumMuscle R_ST:
      PathPoint Muscle-origin: Pelvis (-0.01723745 -0.03320114 0.024309)
      PathPoint P3: thigh_r (-0.002691794 -0.1130181 -0.01804204)
      PathPoint P4: shank_r (-0.00188399 -0.008201611 -0.01863141)
      PathPoint Muscle-insertion: shank_r (0.008220747 -0.02813593 -0.005059633)
    Millard2012EquilibriumMuscle R_TA:
      PathPoint Muscle-origin: shank_r (0.006749284 -0.01980872 0.009062043)
      PathPoint P2: shank_r (0.009448765 -0.09222512 0.006483092)
      PathPoint Muscle-insertion: shank_r (0.009898956 -0.143774 0.001211017)
      PathPoint P4: foot_r (0.02810323 0.0005007036 -0.01107338)
    Millard2012EquilibriumMuscle R_TP:
      PathPoint Muscle-origin: shank_r (-0.00716946 -0.0213263 0.003363445)
      PathPoint P2: shank_r (-0.002586002 -0.0856569 -0.001234338)
      PathPoint P4: shank_r (-0.008699463 -0.1519033 -0.006261067)
      PathPoint P3: foot_r (0.01223677 -0.004575042 -0.01579077)
      PathWrap: wrap_object=R_Ankle_Cylinder method=hybrid range=(3 4)
    Millard2012EquilibriumMuscle R_PECT:
      PathPoint Muscle-origin: Pelvis (0.01962989 -0.003244768 0.01645118)
      PathPoint P2: Pelvis (0.003995226 -0.02844395 0.0321027)
      PathPoint Muscle-insertion: thigh_r (-0.005773039 -0.02942417 0.009378611)
    Millard2012EquilibriumMuscle R_VI:
      PathPoint Muscle-origin: thigh_r (0.005157231 -0.02835133 0.01202467)
      PathPoint P3: thigh_r (0.01753652 -0.1456735 0.00173245)
      PathPoint Muscle-insertion: shank_r (0.0161784 -0.0287576 0.002978206)
      PathWrap: wrap_object=rFemoralCondyles_Cylinder2 method=hybrid
    Millard2012EquilibriumMuscle R_VL:
      PathPoint Muscle-origin: thigh_r (-0.0005610853 -0.01208566 0.01975566)
      PathPoint P2: thigh_r (0.004224163 -0.0862858 0.01993649)
      PathPoint P3: thigh_r (0.01565052 -0.1492371 0.007090923)
      PathPoint Muscle-insertion: shank_r (0.01590454 -0.02875594 0.002727092)
      PathWrap: wrap_object=rFemoralCondyles_Cylinder2 method=hybrid
    Millard2012EquilibriumMuscle R_VMed:
      PathPoint Muscle-origin: thigh_r (0.00153569 -0.01999185 0.005995854)
      PathPoint P2: thigh_r (0.01377783 -0.08976594 -0.003299558)
      PathPoint P3: thigh_r (0.0157913 -0.1454992 -0.001270491)
      PathPoint Muscle-insertion: shank_r (0.01573324 -0.02886261 0.0035804)
      PathWrap: wrap_object=rFemoralCondyles_Cylinder2 method=hybrid range=(3 4)
